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/batch
! ANSYS input file written by Workbench version 2020 R1
! File used for geometry attach: C:\Users\Akash Levy\Documents\NEM-Relay-CAD\ansys\relay_files\dp0\SYS-10\DM\SYS-10.scdoc
/title,relay--Modal (C5)
/com,--- Data in consistent MKS units. See Solving Units in the help system for more information.
/units,MKS
/prep7
! Turn off shape checking because checks already performed inside WB mesher.
! See help system for more information.
SHPP,OFF,,NOWARN
etcon,set             ! allow ANSYS to choose best KEYOP's for 180x elements
/com,*********** Nodes for the whole assembly ***********
nblock,3,,12188
(1i9,3e20.9e3)
        1    -1.800000000E-06    -2.200000000E-06    -1.000000000E-07
        2    -1.800000000E-06    -1.800000000E-06    -1.000000000E-07
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-1
/com,*********** Elements for Body 1 "Relay" ***********
et,1,187
eblock,19,solid,,3362
(19i9)
        1        1        1        1        0        0        0        0       10        0        1      736      930     1125      760     5404     6330     5407     5401
     5505     5508
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-1
/com,*********** Elements for Body 2 "Contact 1" ***********
et,2,186
keyo,2,2,1          ! set full integration on SOLID186
eblock,19,solid,,51
(19i9)
        2        2        2        2        0        0        0        0       20        0     3882     8839     8915     8916     8894     8841     8941     8942     8893
     8975     9159     9115     8973     8982     9221     9111     8980     8972     9161     9164     9109
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-1
/com,*********** Elements for Body 3 "Contact 2" ***********
et,3,186
keyo,3,2,1          ! set full integration on SOLID186
eblock,19,solid,,51
(19i9)
        3        3        3        3        0        0        0        0       20        0     3933     9266     9342     9343     9321     9268     9368     9369     9320
     9402     9586     9542     9400     9409     9648     9538     9407     9399     9588     9591     9536
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-1
/com,*********** Elements for Body 4 "Contact 3" ***********
et,4,186
keyo,4,2,1          ! set full integration on SOLID186
eblock,19,solid,,51
(19i9)
        4        4        4        4        0        0        0        0       20        0     4381    10690    10785    10737    10736    10691    10768    10730    10731
    10883    11000    10998    10882    10888    10990    10988    10886    10879    11056    10989    10992
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-1
/com,*********** Elements for Body 5 "Contact 4" ***********
et,5,186
keyo,5,2,1          ! set full integration on SOLID186
eblock,19,solid,,51
(19i9)
        5        5        5        5        0        0        0        0       20        0     3646     7987     8082     8034     8033     7988     8070     8027     8028
     8180     8297     8295     8179     8185     8287     8285     8183     8176     8367     8286     8289
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-1
/com,*********** Elements for Body 6 "Contact 5" ***********
et,6,187
eblock,19,solid,,185
(19i9)
        6        6        6        6        0        0        0        0       10        0     3697     8378     8430     8412     8380     8477     8670     8476     8471
     8499     8498
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-1
/com,*********** Elements for Body 7 "Contact 6" ***********
et,7,187
eblock,19,solid,,188
(19i9)
        7        7        7        7        0        0        0        0       10        0     3984     9695     9714     9722     9696     9804     9895     9805     9801
     9818     9819
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-1
/com,*********** Elements for Body 8 "Contact 7" ***********
et,8,187
eblock,19,solid,,209
(19i9)
        8        8        8        8        0        0        0        0       10        0     4172    10157    10235    10249    10238    10274    10617    10280    10275
    10612    10633
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-1
/com,*********** Elements for Body 9 "Contact 8" ***********
et,9,187
eblock,19,solid,,183
(19i9)
        9        9        9        9        0        0        0        0       10        0     3463     7504     7506     7574     7507     7637     7657     7641     7638
     7647     7665
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-1
/com,*********** Elements for Body 10 "Substrate" ***********
et,10,186
keyo,10,2,1          ! set full integration on SOLID186
eblock,19,solid,,100
(19i9)
       10       10       10       10        0        0        0        0       20        0     3363     6769     6930     6921     6912     6770     6859     6860     6861
     7191     7483     7475     7190     7194     7389     7391     7195     7189     7390     7392     7394
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-1
/com,*********** Send User Defined Coordinate System(s) ***********
csys,0
toffst,273.15,  ! Temperature offset from absolute zero
/com,*********** Set Reference Temperature ***********
tref,22.
/com,*********** Send Materials ***********
Temperature = 'TEMP' ! Temperature
MP,DENS,1,4126,	! kg m^-3
MP,EX,1,145000000000,	! Pa
MP,NUXY,1,0.271929824561403,
MP,RSVX,1,1.49e-05,	! kg m^3 A^-2 s^-3

Temperature = 'TEMP' ! Temperature
MP,DENS,2,19300,	! kg m^-3
MP,EX,2,411000000000,	! Pa
MP,NUXY,2,0.28,
MP,RSVX,2,5.6e-08,	! kg m^3 A^-2 s^-3

Temperature = 'TEMP' ! Temperature
MP,DENS,3,19300,	! kg m^-3
MP,EX,3,411000000000,	! Pa
MP,NUXY,3,0.28,
MP,RSVX,3,5.6e-08,	! kg m^3 A^-2 s^-3

Temperature = 'TEMP' ! Temperature
MP,DENS,4,19300,	! kg m^-3
MP,EX,4,411000000000,	! Pa
MP,NUXY,4,0.28,
MP,RSVX,4,5.6e-08,	! kg m^3 A^-2 s^-3

Temperature = 'TEMP' ! Temperature
MP,DENS,5,19300,	! kg m^-3
MP,EX,5,411000000000,	! Pa
MP,NUXY,5,0.28,
MP,RSVX,5,5.6e-08,	! kg m^3 A^-2 s^-3

Temperature = 'TEMP' ! Temperature
MP,DENS,6,19300,	! kg m^-3
MP,EX,6,411000000000,	! Pa
MP,NUXY,6,0.28,
MP,RSVX,6,5.6e-08,	! kg m^3 A^-2 s^-3

Temperature = 'TEMP' ! Temperature
MP,DENS,7,19300,	! kg m^-3
MP,EX,7,411000000000,	! Pa
MP,NUXY,7,0.28,
MP,RSVX,7,5.6e-08,	! kg m^3 A^-2 s^-3

Temperature = 'TEMP' ! Temperature
MP,DENS,8,19300,	! kg m^-3
MP,EX,8,411000000000,	! Pa
MP,NUXY,8,0.28,
MP,RSVX,8,5.6e-08,	! kg m^3 A^-2 s^-3

Temperature = 'TEMP' ! Temperature
MP,DENS,9,19300,	! kg m^-3
MP,EX,9,411000000000,	! Pa
MP,NUXY,9,0.28,
MP,RSVX,9,5.6e-08,	! kg m^3 A^-2 s^-3

Temperature = 'TEMP' ! Temperature
MP,DENS,10,19300,	! kg m^-3
MP,EX,10,411000000000,	! Pa
MP,NUXY,10,0.28,
MP,RSVX,10,5.6e-08,	! kg m^3 A^-2 s^-3

!************************* Model Summary ********************
!Relay,	Poly-SiGe,	matid,	1
!Contact 1,	Tungsten,	matid,	2
!Contact 2,	Tungsten,	matid,	3
!Contact 3,	Tungsten,	matid,	4
!Contact 4,	Tungsten,	matid,	5
!Contact 5,	Tungsten,	matid,	6
!Contact 6,	Tungsten,	matid,	7
!Contact 7,	Tungsten,	matid,	8
!Contact 8,	Tungsten,	matid,	9
!Substrate,	Tungsten,	matid,	10
!************************* End Model Summary ********************
/com,*********** Create Contact "Contact Region 11" ***********
*set,tid,12
*set,cid,11
r,tid
r,cid
et,tid,170
et,cid,174
eblock,10,,,19
(15i9)
     7992       12       12       12        0       51      448       52       52     1470     1477       52     1468
     7993       12       12       12        0       35      447       36       36     1366     1372       36     1363
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-1
eblock,10,,,19
(15i9)
     8011       11       11       11        0       51      448       52       52     1470     1477       52     1468
     8012       11       11       11        0       35      447       36       36     1366     1372       36     1363
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-1
eblock,10,,,42
(15i9)
     8030       11       12       11        0     8900     8914     8940     8899     9130     9158     9127     9125
     8031       11       12       11        0     8901     8927     8914     8900     9132     9157     9130     9128
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-1
eblock,10,,,42
(15i9)
     8072       12       11       12        0     8900     8914     8940     8899     9130     9158     9127     9125
     8073       12       11       12        0     8901     8927     8914     8900     9132     9157     9130     9128
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-1
keyo,cid,8,2               ! auto create asymmetric contact (from Program Controlled setting)
keyo,cid,10,0              ! adjust contact stiffness each NR iteration (from Program Controlled setting)
keyo,cid,12,5              ! bonded always
keyo,cid,18,1              ! small sliding turned on by application
keyo,cid,2,0               ! augmented Lagrange (from Program Controlled setting)
keyo,cid,4,0               ! on Gauss point (from Program Controlled setting)
keyo,cid,9,1               ! ignore initial gaps/penetration
keyo,cid,7,0               ! No Prediction
rmod,tid,3,1.       ! FKN
rmod,tid,5,0.       ! ICONT
rmod,tid,6,0.       ! PINB
rmod,tid,10,0.      ! CNOF
rmod,tid,12,0.      ! FKT
rmod,tid,36,327     ! WB DSID
rmod,cid,3,1.       ! FKN
rmod,cid,5,0.       ! ICONT
rmod,cid,6,0.       ! PINB
rmod,cid,10,0.      ! CNOF
rmod,cid,12,0.      ! FKT
rmod,cid,36,327     ! WB DSID
/com,*********** Create Contact "Contact Region 12" ***********
*set,tid,14
*set,cid,13
r,tid
r,cid
et,tid,170
et,cid,174
eblock,10,,,16
(15i9)
     8114       14       14       14        0      316      499      500      500     3347     4252      500     3348
     8115       14       14       14        0      316      500      318      318     3348     3360      318     3346
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-1
eblock,10,,,16
(15i9)
     8130       13       13       13        0      316      499      500      500     3347     4252      500     3348
     8131       13       13       13        0      316      500      318      318     3348     3360      318     3346
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-1
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eblock,10,,,42
(15i9)
     8188       14       13       14        0     9327     9341     9367     9326     9557     9585     9554     9552
     8189       14       13       14        0     9328     9354     9341     9327     9559     9584     9557     9555
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-1
keyo,cid,8,2               ! auto create asymmetric contact (from Program Controlled setting)
keyo,cid,10,0              ! adjust contact stiffness each NR iteration (from Program Controlled setting)
keyo,cid,12,5              ! bonded always
keyo,cid,18,1              ! small sliding turned on by application
keyo,cid,2,0               ! augmented Lagrange (from Program Controlled setting)
keyo,cid,4,0               ! on Gauss point (from Program Controlled setting)
keyo,cid,9,1               ! ignore initial gaps/penetration
keyo,cid,7,0               ! No Prediction
rmod,tid,3,1.       ! FKN
rmod,tid,5,0.       ! ICONT
rmod,tid,6,0.       ! PINB
rmod,tid,10,0.      ! CNOF
rmod,tid,12,0.      ! FKT
rmod,tid,36,330     ! WB DSID
rmod,cid,3,1.       ! FKN
rmod,cid,5,0.       ! ICONT
rmod,cid,6,0.       ! PINB
rmod,cid,10,0.      ! CNOF
rmod,cid,12,0.      ! FKT
rmod,cid,36,330     ! WB DSID
/com,*********** Create Contact "Contact Region 13" ***********
*set,tid,16
*set,cid,15
r,tid
r,cid
et,tid,170
et,cid,174
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eblock,10,,,42
(15i9)
     8310       16       15       16        0    10747    10708    10682    10683    10926    10866    10865    10867
     8311       16       15       16        0    10748    10721    10708    10747    10962    10925    10926    11019
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-1
keyo,cid,8,2               ! auto create asymmetric contact (from Program Controlled setting)
keyo,cid,10,0              ! adjust contact stiffness each NR iteration (from Program Controlled setting)
keyo,cid,12,5              ! bonded always
keyo,cid,18,1              ! small sliding turned on by application
keyo,cid,2,0               ! augmented Lagrange (from Program Controlled setting)
keyo,cid,4,0               ! on Gauss point (from Program Controlled setting)
keyo,cid,9,1               ! ignore initial gaps/penetration
keyo,cid,7,0               ! No Prediction
rmod,tid,3,1.       ! FKN
rmod,tid,5,0.       ! ICONT
rmod,tid,6,0.       ! PINB
rmod,tid,10,0.      ! CNOF
rmod,tid,12,0.      ! FKT
rmod,tid,36,333     ! WB DSID
rmod,cid,3,1.       ! FKN
rmod,cid,5,0.       ! ICONT
rmod,cid,6,0.       ! PINB
rmod,cid,10,0.      ! CNOF
rmod,cid,12,0.      ! FKT
rmod,cid,36,333     ! WB DSID
/com,*********** Create Contact "Contact Region 14" ***********
*set,tid,18
*set,cid,17
r,tid
r,cid
et,tid,170
et,cid,174
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eblock,10,,,42
(15i9)
     8426       18       17       18        0     8044     8005     7979     7980     8223     8163     8162     8164
     8427       18       17       18        0     8045     8018     8005     8044     8259     8222     8223     8316
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-1
keyo,cid,8,2               ! auto create asymmetric contact (from Program Controlled setting)
keyo,cid,10,0              ! adjust contact stiffness each NR iteration (from Program Controlled setting)
keyo,cid,12,5              ! bonded always
keyo,cid,18,1              ! small sliding turned on by application
keyo,cid,2,0               ! augmented Lagrange (from Program Controlled setting)
keyo,cid,4,0               ! on Gauss point (from Program Controlled setting)
keyo,cid,9,1               ! ignore initial gaps/penetration
keyo,cid,7,0               ! No Prediction
rmod,tid,3,1.       ! FKN
rmod,tid,5,0.       ! ICONT
rmod,tid,6,0.       ! PINB
rmod,tid,10,0.      ! CNOF
rmod,tid,12,0.      ! FKT
rmod,tid,36,336     ! WB DSID
rmod,cid,3,1.       ! FKN
rmod,cid,5,0.       ! ICONT
rmod,cid,6,0.       ! PINB
rmod,cid,10,0.      ! CNOF
rmod,cid,12,0.      ! FKT
rmod,cid,36,336     ! WB DSID
/com,*********** Create Contact "Contact Region 15" ***********
*set,tid,20
*set,cid,19
r,tid
r,cid
et,tid,170
et,cid,174
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eblock,10,,,52
(15i9)
     8600       20       19       20        0     8420     8421     8429     8429     8720     8724     8429     8721
     8601       20       19       20        0     8430     8453     8460     8460     8747     8809     8460     8749
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-1
keyo,cid,8,2               ! auto create asymmetric contact (from Program Controlled setting)
keyo,cid,10,0              ! adjust contact stiffness each NR iteration (from Program Controlled setting)
keyo,cid,12,5              ! bonded always
keyo,cid,18,1              ! small sliding turned on by application
keyo,cid,2,0               ! augmented Lagrange (from Program Controlled setting)
keyo,cid,4,0               ! on Gauss point (from Program Controlled setting)
keyo,cid,9,1               ! ignore initial gaps/penetration
keyo,cid,7,0               ! No Prediction
rmod,tid,3,1.       ! FKN
rmod,tid,5,0.       ! ICONT
rmod,tid,6,0.       ! PINB
rmod,tid,10,0.      ! CNOF
rmod,tid,12,0.      ! FKT
rmod,tid,36,339     ! WB DSID
rmod,cid,3,1.       ! FKN
rmod,cid,5,0.       ! ICONT
rmod,cid,6,0.       ! PINB
rmod,cid,10,0.      ! CNOF
rmod,cid,12,0.      ! FKT
rmod,cid,36,339     ! WB DSID
/com,*********** Create Contact "Contact Region 16" ***********
*set,tid,22
*set,cid,21
r,tid
r,cid
et,tid,170
et,cid,174
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eblock,10,,,48
(15i9)
     8780       22       21       22        0     9703     9767     9773     9773     9858    10127     9773     9860
     8781       22       21       22        0     9713     9776     9740     9740     9893    10035     9740     9889
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-1
keyo,cid,8,2               ! auto create asymmetric contact (from Program Controlled setting)
keyo,cid,10,0              ! adjust contact stiffness each NR iteration (from Program Controlled setting)
keyo,cid,12,5              ! bonded always
keyo,cid,18,1              ! small sliding turned on by application
keyo,cid,2,0               ! augmented Lagrange (from Program Controlled setting)
keyo,cid,4,0               ! on Gauss point (from Program Controlled setting)
keyo,cid,9,1               ! ignore initial gaps/penetration
keyo,cid,7,0               ! No Prediction
rmod,tid,3,1.       ! FKN
rmod,tid,5,0.       ! ICONT
rmod,tid,6,0.       ! PINB
rmod,tid,10,0.      ! CNOF
rmod,tid,12,0.      ! FKT
rmod,tid,36,342     ! WB DSID
rmod,cid,3,1.       ! FKN
rmod,cid,5,0.       ! ICONT
rmod,cid,6,0.       ! PINB
rmod,cid,10,0.      ! CNOF
rmod,cid,12,0.      ! FKT
rmod,cid,36,342     ! WB DSID
/com,*********** Create Contact "Contact Region 17" ***********
*set,tid,24
*set,cid,23
r,tid
r,cid
et,tid,170
et,cid,174
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eblock,10,,,56
(15i9)
     8972       24       23       24        0    10171    10174    10172    10172    10353    10355    10172    10352
     8973       24       23       24        0    10202    10237    10225    10225    10510    10594    10225    10508
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-1
keyo,cid,8,2               ! auto create asymmetric contact (from Program Controlled setting)
keyo,cid,10,0              ! adjust contact stiffness each NR iteration (from Program Controlled setting)
keyo,cid,12,5              ! bonded always
keyo,cid,18,1              ! small sliding turned on by application
keyo,cid,2,0               ! augmented Lagrange (from Program Controlled setting)
keyo,cid,4,0               ! on Gauss point (from Program Controlled setting)
keyo,cid,9,1               ! ignore initial gaps/penetration
keyo,cid,7,0               ! No Prediction
rmod,tid,3,1.       ! FKN
rmod,tid,5,0.       ! ICONT
rmod,tid,6,0.       ! PINB
rmod,tid,10,0.      ! CNOF
rmod,tid,12,0.      ! FKT
rmod,tid,36,345     ! WB DSID
rmod,cid,3,1.       ! FKN
rmod,cid,5,0.       ! ICONT
rmod,cid,6,0.       ! PINB
rmod,cid,10,0.      ! CNOF
rmod,cid,12,0.      ! FKT
rmod,cid,36,345     ! WB DSID
/com,*********** Create Contact "Contact Region 18" ***********
*set,tid,26
*set,cid,25
r,tid
r,cid
et,tid,170
et,cid,174
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eblock,10,,,52
(15i9)
     9162       26       25       26        0     7521     7574     7559     7559     7743     7899     7559     7742
     9163       26       25       26        0     7544     7567     7574     7574     7853     7917     7574     7855
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-1
keyo,cid,8,2               ! auto create asymmetric contact (from Program Controlled setting)
keyo,cid,10,0              ! adjust contact stiffness each NR iteration (from Program Controlled setting)
keyo,cid,12,5              ! bonded always
keyo,cid,18,1              ! small sliding turned on by application
keyo,cid,2,0               ! augmented Lagrange (from Program Controlled setting)
keyo,cid,4,0               ! on Gauss point (from Program Controlled setting)
keyo,cid,9,1               ! ignore initial gaps/penetration
keyo,cid,7,0               ! No Prediction
rmod,tid,3,1.       ! FKN
rmod,tid,5,0.       ! ICONT
rmod,tid,6,0.       ! PINB
rmod,tid,10,0.      ! CNOF
rmod,tid,12,0.      ! FKT
rmod,tid,36,348     ! WB DSID
rmod,cid,3,1.       ! FKN
rmod,cid,5,0.       ! ICONT
rmod,cid,6,0.       ! PINB
rmod,cid,10,0.      ! CNOF
rmod,cid,12,0.      ! FKT
rmod,cid,36,348     ! WB DSID
/com,*********** Create Contact "Contact Region 19" ***********
*set,tid,28
*set,cid,27
r,tid
r,cid
et,tid,170
et,cid,174
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eblock,10,,,16
(15i9)
     9278       28       27       28        0     6768     6759     6760     6769     7159     7158     7161     7186
     9279       28       27       28        0     6759     6750     6751     6760     7131     7130     7133     7158
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-1
keyo,cid,8,2               ! auto create asymmetric contact (from Program Controlled setting)
keyo,cid,10,0              ! adjust contact stiffness each NR iteration (from Program Controlled setting)
keyo,cid,12,5              ! bonded always
keyo,cid,18,1              ! small sliding turned on by application
keyo,cid,2,0               ! augmented Lagrange (from Program Controlled setting)
keyo,cid,4,0               ! on Gauss point (from Program Controlled setting)
keyo,cid,9,1               ! ignore initial gaps/penetration
keyo,cid,7,0               ! No Prediction
rmod,tid,3,1.       ! FKN
rmod,tid,5,0.       ! ICONT
rmod,tid,6,0.       ! PINB
rmod,tid,10,0.      ! CNOF
rmod,tid,12,0.      ! FKT
rmod,tid,36,351     ! WB DSID
rmod,cid,3,1.       ! FKN
rmod,cid,5,0.       ! ICONT
rmod,cid,6,0.       ! PINB
rmod,cid,10,0.      ! CNOF
rmod,cid,12,0.      ! FKT
rmod,cid,36,351     ! WB DSID
/com,*********** Create Contact "Rough - Multiple To Substrate" ***********
*set,tid,30
*set,cid,29
r,tid
r,cid
et,tid,170
et,cid,174
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eblock,10,,,100
(15i9)
    11578       30       29       30        0     6930     6769     6912     6921     7191     7190     7475     7483
    11579       30       29       30        0     6769     6760     6913     6912     7161     7163     7474     7190
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-1
keyo,cid,8,2               ! auto create asymmetric contact (from Program Controlled setting)
keyo,cid,10,0              ! adjust contact stiffness each NR iteration (from Program Controlled setting)
keyo,cid,12,1              ! rough contact
keyo,cid,18,1              ! small sliding turned on by application
keyo,cid,2,0               ! augmented Lagrange (from Program Controlled setting)
keyo,cid,4,0               ! on Gauss point (from Program Controlled setting)
keyo,cid,9,0               ! use real geometry with stepped effects
keyo,cid,7,0               ! No Prediction
rmod,tid,3,1.       ! FKN
rmod,tid,5,0.       ! ICONT
rmod,tid,6,0.       ! PINB
rmod,tid,10,0.      ! CNOF
rmod,tid,12,0.      ! FKT
rmod,tid,36,578     ! WB DSID
rmod,cid,3,1.       ! FKN
rmod,cid,5,0.       ! ICONT
rmod,cid,6,0.       ! PINB
rmod,cid,10,0.      ! CNOF
rmod,cid,12,0.      ! FKT
rmod,cid,36,578     ! WB DSID
nsel,all
esel,all
CMBLOCK,FACE_NODES,NODE,     1376
(8i10)
        35        36        38        40        43        44        46        48
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
/com,*********** Send Named Selection as Node Component ***********
CMBLOCK,FLUIDIC_INTERFACE,NODE,     7118
(8i10)
         1         2         3         4         5         6         7         8
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/com,*********** Fixed Supports ***********
CMBLOCK,_FIXEDSU,NODE,      341
(8i10)
      6689      6690      6691      6692      6693      6694      6695      6696
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cmsel,s,_FIXEDSU
d,all,all
nsel,all
fini
/solu
antype,2                   ! modal analysis
_thickRatio=  0     ! Ratio of thick parts in the model
modopt,lanb,6
outres,erase
outres,all,none
outres,nsol,all
outres,etmp,all
mxpand                    ! default expand in case of complex solution
dmpopt,esav,no
dmpopt,emat,no
dmpopt,full,no
! *********** WB SOLVE COMMAND ***********
! check interactive state
*get,ANSINTER_,active,,int
*if,ANSINTER_,ne,0,then
/eof
*endif
solve
/com *************** Write FE CONNECTORS *********
CEWRITE,file,ce,,INTE
*get,_nmodalsolproc,active,0,numcpu
fini
/post1
*dim,_direction,CHAR,6,1
_direction(1) = 'X'
_direction(2) = 'Y'
_direction(3) = 'Z'
_direction(4) = 'ROTX'
_direction(5) = 'ROTY'
_direction(6) = 'ROTZ'
*get,_lastLS,active,0,set,LSTP
*get,_beginset,active,0,set,nset,first,_lastLS
*get,_endset,active,0,set,nset,last,_lastLS
_nummodes = 0
*if,_endset,gt,0,then
_nummodes = _endset - _beginset + 1
*endif
*do,i_mode,1,_nummodes
   *do,j_component,1,6
			*get,PFACT_%i_mode%_%j_component%,MODE,%i_mode%,PFACT,,DIREC,_direction(%j_component%)
   *enddo
*enddo
*dim,_tmdirection,CHAR,6,1
_tmdirection(1) = 'X'
_tmdirection(2) = 'Y'
_tmdirection(3) = 'Z'
_tmdirection(4) = 'X'
_tmdirection(5) = 'Y'
_tmdirection(6) = 'Z'
*do,j_component,1,6
    *if,j_component,gt,3,then
        *get,TOTALMASS_%j_component%,ELEM,0,IOR,_tmdirection(%j_component%)
    *else
        *get,TOTALMASS_%j_component%,ELEM,0,MTOT,_tmdirection(%j_component%)
    *endif
*enddo
fini
