// COMSOL Multiphysics 5.4.0.388 model "Relay54.mph"
// NEM Relay Analysis
// Analyzes various properties of NEM relays
// Outline of the model tree

Parameters
  t_poly = 0.12[um]  // Thickness of poly-SiGe layer + dielectric
  t_cont = 0.025[um]  // Thickness of contacts
  t_sp = 0.03[um]  // Thickness of dielectric
  t_chan = 0.01[um]  // Thickness of channel
  t_sub = 0.5[um]  // Thickness of substrate
  g_act = 0.06[um]  // Actuation gap
  L_plate = 3[um]  // Side length of plate
  en = 5e16[Pa/m]  // Spring stiffness
  tn = 1e6[Pa]  // Pressure in contact
  gaptol = 10[nm]  // How much gap to leave
  rho_w = 55e-9[ohm*m]  // Contact material resistivity (W)
  lambda_w = 33[nm]  // Contact material mean free path (W)
  eta_w = 0.3  // Contact deformation coefficient
  H_w = 1.1[GPa]  // Contact material hardness (W)
  F_spr = 1e-8[N]  // Force to apply for spring constant
  V_gate_max = 10[V]  // Max voltage to apply to gate (quasi_static sweep)
  V_gate_op = 5[V]  // Voltage to apply to gate during operation
  L_cant = 3.0[um]  // Length of cantilever beam
  L_cont = 150.0[nm]  // Side length of contact
  L_hole = 100.0[nm]  // Side length of release hole
  L_via = 400.0[nm]  // Side length of via
  L_anc = 600.0[nm]  // Side length of anchor extension
  W_cant = 200.0[nm]  // Width of cantilever beam
  g_cant = 200.0[nm]  // Gap between cantilever beam and relay body
  g_land = 50.0[nm]  // Gap for spacing between landing pads and gate
  r_hole_pl = 1170.0[nm]  // Radius along which to place holes
  d_hole_pl = 200.0[nm]  // Diameter along which to place holes
  t_gap = 60.0[nm]  // Gap between poly body and substrate
  Qf = 0.5  // Quality factor of relay motion
  Rcont = 1000.0[ohm]  // Contact resistance
  Rair = 1e+15[ohm]  // Air resistance
  K_sp = 5.7  // Relative permittivity of dielectric spacer
  cont1x = -914.64816153[nm]  // Contact 1 x position (center)
  cont1y = -92.9790593972[nm]  // Contact 1 y position (center)
  cont2x = -740.657462517[nm]  // Contact 2 x position (center)
  cont2y = -570.357909966[nm]  // Contact 2 y position (center)
  cont3x = -507.52483333[nm]  // Contact 3 x position (center)
  cont3y = -621.257718064[nm]  // Contact 3 y position (center)
  cont4x = -104.373865078[nm]  // Contact 4 x position (center)
  cont4y = -792.469056963[nm]  // Contact 4 y position (center)
  cont5x = 94.8168750819[nm]  // Contact 5 x position (center)
  cont5y = -932.487795275[nm]  // Contact 5 y position (center)
  cont6x = 579.686583965[nm]  // Contact 6 x position (center)
  cont6y = -740.103170576[nm]  // Contact 6 y position (center)
  cont7x = 627.82524352[nm]  // Contact 7 x position (center)
  cont7y = -506.165868755[nm]  // Contact 7 y position (center)
  cont8x = 801.533815722[nm]  // Contact 8 x position (center)
  cont8y = -101.470007263[nm]  // Contact 8 y position (center)
  cont9x = 935.959574674[nm]  // Contact 9 x position (center)
  cont9y = 98.2348535441[nm]  // Contact 9 y position (center)
  cont10x = 728.81629865[nm]  // Contact 10 x position (center)
  cont10y = 557.130690606[nm]  // Contact 10 y position (center)
  cont11x = 495.693616068[nm]  // Contact 11 x position (center)
  cont11y = 610.874206284[nm]  // Contact 11 y position (center)
  cont12x = 92.7223418729[nm]  // Contact 12 x position (center)
  cont12y = 775.818853239[nm]  // Contact 12 y position (center)
  cont13x = -116.598291642[nm]  // Contact 13 x position (center)
  cont13y = 898.942551616[nm]  // Contact 13 y position (center)
  cont14x = -532.101842082[nm]  // Contact 14 x position (center)
  cont14y = 734.565285152[nm]  // Contact 14 y position (center)
  cont15x = -597.831811989[nm]  // Contact 15 x position (center)
  cont15y = 503.946891573[nm]  // Contact 15 y position (center)
  cont16x = -778.328174294[nm]  // Contact 16 x position (center)
  cont16y = 104.983106516[nm]  // Contact 16 y position (center)

Functions
  tri1: Triangle "Sweep Triangle" | lower = 0; upper = 4e-5; smooth = 1e-6
  an1: Analytic "Penalty Contact Force" | expr = (x<=0)*(tn - en*x) + (x >= 0)*tn*exp(-x*en/tn)
  rect1: Rectangle | lower = 1.5e-9; upper = 5e-7; smooth = 1e-9

Variables
  var1 "Contact Variables"
    body_gap = (g_act - gaptol) + w  // Gap between body and substrate
    cont_gap = (g_act - t_cont) + w  // Gap between channel and substrate
    Pc_body = (body_gap<=0)*(tn - en*body_gap) + (body_gap >= 0)*tn*exp(-body_gap*en/tn)  // Penalty-based contact pressure for contacts
    Pc_cont = (cont_gap<=0)*(tn - en*cont_gap) + (cont_gap >= 0)*tn*exp(-cont_gap*en/tn)  // Penalty-based contact pressure for channels
  var2 "Contact Variables 2"
    body_gap2 = (g_act - gaptol) + w2  // Gap between body and substrate
    cont_gap2 = (g_act - t_cont) + w2  // Gap between channel and substrate
    Pc_body2 = (body_gap2<=0)*(tn - en*body_gap2) + (body_gap2 >= 0)*tn*exp(-body_gap2*en/tn)  // Penalty-based contact pressure for contacts
    Pc_cont2 = (cont_gap2<=0)*(tn - en*cont_gap2) + (cont_gap2 >= 0)*tn*exp(-cont_gap2*en/tn)  // Penalty-based contact pressure for channels

Selections
  dif5: Difference "Anchor Via" | entitydim = 3; add = {geom1_imp1_Substrate_Metal_dom}; subtract = {box5}
  adj34: Adjacent "Anchor Via Boundary" | entitydim = 3; input = {dif5}; outputdim = 2
  uni3: Union "Body" | entitydim = 3; input = {geom1_imp1_Anchor_dom, geom1_boxsel3}
  adj8: Adjacent "Body Boundary" | entitydim = 3; input = {uni3}; outputdim = 2
  box7: Box "Body Bottom Boundary"
    entitydim = 2
    inputent = selections
    input = {geom1_imp1_Body_bnd}
    zmin = g_act
    zmax = g_act
    condition = allvertices
  uni5: Union "Gnd Boundary" | entitydim = 2; input = {adj8, adj34}
  box2: Box "Plate Force Area"
    entitydim = 2
    xmin = -L_plate/2
    xmax = L_plate/2
    ymin = -L_plate/2
    ymax = L_plate/2
    zmin = g_act + t_sp
    zmax = g_act + t_sp
    condition = allvertices
  box9: Box "Contact 1"
    entitydim = 3
    inputent = selections
    input = {geom1_imp1_Contact_dom}
    xmin = cont1x-0.0001
    xmax = cont1x+0.0001
    ymin = cont1y-0.0001
    ymax = cont1y+0.0001
    zmin = g_act - (t_cont - gaptol)-0.0001
    zmax = g_act - (t_cont - gaptol)+0.0001
  box10: Box "Contact 2"
    entitydim = 3
    inputent = selections
    input = {geom1_imp1_Contact_dom}
    xmin = cont2x-0.0001
    xmax = cont2x+0.0001
    ymin = cont2y-0.0001
    ymax = cont2y+0.0001
    zmin = g_act - (t_cont - gaptol)-0.0001
    zmax = g_act - (t_cont - gaptol)+0.0001
  box11: Box "Contact 3"
    entitydim = 3
    inputent = selections
    input = {geom1_imp1_Contact_dom}
    xmin = cont3x-0.0001
    xmax = cont3x+0.0001
    ymin = cont3y-0.0001
    ymax = cont3y+0.0001
    zmin = g_act - (t_cont - gaptol)-0.0001
    zmax = g_act - (t_cont - gaptol)+0.0001
  box12: Box "Contact 4"
    entitydim = 3
    inputent = selections
    input = {geom1_imp1_Contact_dom}
    xmin = cont4x-0.0001
    xmax = cont4x+0.0001
    ymin = cont4y-0.0001
    ymax = cont4y+0.0001
    zmin = g_act - (t_cont - gaptol)-0.0001
    zmax = g_act - (t_cont - gaptol)+0.0001
  box13: Box "Contact 5"
    entitydim = 3
    inputent = selections
    input = {geom1_imp1_Contact_dom}
    xmin = cont5x-0.0001
    xmax = cont5x+0.0001
    ymin = cont5y-0.0001
    ymax = cont5y+0.0001
    zmin = g_act - (t_cont - gaptol)-0.0001
    zmax = g_act - (t_cont - gaptol)+0.0001
  box14: Box "Contact 6"
    entitydim = 3
    inputent = selections
    input = {geom1_imp1_Contact_dom}
    xmin = cont6x-0.0001
    xmax = cont6x+0.0001
    ymin = cont6y-0.0001
    ymax = cont6y+0.0001
    zmin = g_act - (t_cont - gaptol)-0.0001
    zmax = g_act - (t_cont - gaptol)+0.0001
  box15: Box "Contact 7"
    entitydim = 3
    inputent = selections
    input = {geom1_imp1_Contact_dom}
    xmin = cont7x-0.0001
    xmax = cont7x+0.0001
    ymin = cont7y-0.0001
    ymax = cont7y+0.0001
    zmin = g_act - (t_cont - gaptol)-0.0001
    zmax = g_act - (t_cont - gaptol)+0.0001
  box16: Box "Contact 8"
    entitydim = 3
    inputent = selections
    input = {geom1_imp1_Contact_dom}
    xmin = cont8x-0.0001
    xmax = cont8x+0.0001
    ymin = cont8y-0.0001
    ymax = cont8y+0.0001
    zmin = g_act - (t_cont - gaptol)-0.0001
    zmax = g_act - (t_cont - gaptol)+0.0001
  box17: Box "Contact 9"
    entitydim = 3
    inputent = selections
    input = {geom1_imp1_Contact_dom}
    xmin = cont9x-0.0001
    xmax = cont9x+0.0001
    ymin = cont9y-0.0001
    ymax = cont9y+0.0001
    zmin = g_act - (t_cont - gaptol)-0.0001
    zmax = g_act - (t_cont - gaptol)+0.0001
  box18: Box "Contact 10"
    entitydim = 3
    inputent = selections
    input = {geom1_imp1_Contact_dom}
    xmin = cont10x-0.0001
    xmax = cont10x+0.0001
    ymin = cont10y-0.0001
    ymax = cont10y+0.0001
    zmin = g_act - (t_cont - gaptol)-0.0001
    zmax = g_act - (t_cont - gaptol)+0.0001
  box19: Box "Contact 11"
    entitydim = 3
    inputent = selections
    input = {geom1_imp1_Contact_dom}
    xmin = cont11x-0.0001
    xmax = cont11x+0.0001
    ymin = cont11y-0.0001
    ymax = cont11y+0.0001
    zmin = g_act - (t_cont - gaptol)-0.0001
    zmax = g_act - (t_cont - gaptol)+0.0001
  box20: Box "Contact 12"
    entitydim = 3
    inputent = selections
    input = {geom1_imp1_Contact_dom}
    xmin = cont12x-0.0001
    xmax = cont12x+0.0001
    ymin = cont12y-0.0001
    ymax = cont12y+0.0001
    zmin = g_act - (t_cont - gaptol)-0.0001
    zmax = g_act - (t_cont - gaptol)+0.0001
  box21: Box "Contact 13"
    entitydim = 3
    inputent = selections
    input = {geom1_imp1_Contact_dom}
    xmin = cont13x-0.0001
    xmax = cont13x+0.0001
    ymin = cont13y-0.0001
    ymax = cont13y+0.0001
    zmin = g_act - (t_cont - gaptol)-0.0001
    zmax = g_act - (t_cont - gaptol)+0.0001
  box22: Box "Contact 14"
    entitydim = 3
    inputent = selections
    input = {geom1_imp1_Contact_dom}
    xmin = cont14x-0.0001
    xmax = cont14x+0.0001
    ymin = cont14y-0.0001
    ymax = cont14y+0.0001
    zmin = g_act - (t_cont - gaptol)-0.0001
    zmax = g_act - (t_cont - gaptol)+0.0001
  box23: Box "Contact 15"
    entitydim = 3
    inputent = selections
    input = {geom1_imp1_Contact_dom}
    xmin = cont15x-0.0001
    xmax = cont15x+0.0001
    ymin = cont15y-0.0001
    ymax = cont15y+0.0001
    zmin = g_act - (t_cont - gaptol)-0.0001
    zmax = g_act - (t_cont - gaptol)+0.0001
  box24: Box "Contact 16"
    entitydim = 3
    inputent = selections
    input = {geom1_imp1_Contact_dom}
    xmin = cont16x-0.0001
    xmax = cont16x+0.0001
    ymin = cont16y-0.0001
    ymax = cont16y+0.0001
    zmin = g_act - (t_cont - gaptol)-0.0001
    zmax = g_act - (t_cont - gaptol)+0.0001
  adj37: Adjacent "Contact 1 Boundary" | entitydim = 3; input = {box9}; outputdim = 2
  adj38: Adjacent "Contact 2 Boundary" | entitydim = 3; input = {box10}; outputdim = 2
  adj39: Adjacent "Contact 3 Boundary" | entitydim = 3; input = {box11}; outputdim = 2
  adj40: Adjacent "Contact 4 Boundary" | entitydim = 3; input = {box12}; outputdim = 2
  adj41: Adjacent "Contact 5 Boundary" | entitydim = 3; input = {box13}; outputdim = 2
  adj42: Adjacent "Contact 6 Boundary" | entitydim = 3; input = {box14}; outputdim = 2
  adj43: Adjacent "Contact 7 Boundary" | entitydim = 3; input = {box15}; outputdim = 2
  adj44: Adjacent "Contact 8 Boundary" | entitydim = 3; input = {box16}; outputdim = 2
  adj45: Adjacent "Contact 9 Boundary" | entitydim = 3; input = {box17}; outputdim = 2
  adj46: Adjacent "Contact 10 Boundary" | entitydim = 3; input = {box18}; outputdim = 2
  adj47: Adjacent "Contact 11 Boundary" | entitydim = 3; input = {box19}; outputdim = 2
  adj48: Adjacent "Contact 12 Boundary" | entitydim = 3; input = {box20}; outputdim = 2
  adj49: Adjacent "Contact 13 Boundary" | entitydim = 3; input = {box21}; outputdim = 2
  adj50: Adjacent "Contact 14 Boundary" | entitydim = 3; input = {box22}; outputdim = 2
  adj51: Adjacent "Contact 15 Boundary" | entitydim = 3; input = {box23}; outputdim = 2
  adj52: Adjacent "Contact 16 Boundary" | entitydim = 3; input = {box24}; outputdim = 2
  box8: Box "Contact Bottom Boundary"
    entitydim = 2
    xmin = -L_plate/2
    xmax = L_plate/2
    ymin = -L_plate/2
    ymax = L_plate/2
    zmin = g_act - (t_cont - gaptol)
    zmax = g_act - (t_cont - gaptol)
    condition = allvertices
  int1: Intersection "Contact 1 Bottom Boundary" | entitydim = 2; input = {box8, adj37}
  int2: Intersection "Contact 2 Bottom Boundary" | entitydim = 2; input = {box8, adj38}
  int3: Intersection "Contact 3 Bottom Boundary" | entitydim = 2; input = {box8, adj39}
  int4: Intersection "Contact 4 Bottom Boundary" | entitydim = 2; input = {box8, adj40}
  int5: Intersection "Contact 5 Bottom Boundary" | entitydim = 2; input = {box8, adj41}
  int6: Intersection "Contact 6 Bottom Boundary" | entitydim = 2; input = {box8, adj42}
  int7: Intersection "Contact 7 Bottom Boundary" | entitydim = 2; input = {box8, adj43}
  int8: Intersection "Contact 8 Bottom Boundary" | entitydim = 2; input = {box8, adj44}
  int9: Intersection "Contact 9 Bottom Boundary" | entitydim = 2; input = {box8, adj45}
  int10: Intersection "Contact 10 Bottom Boundary" | entitydim = 2; input = {box8, adj46}
  int11: Intersection "Contact 11 Bottom Boundary" | entitydim = 2; input = {box8, adj47}
  int12: Intersection "Contact 12 Bottom Boundary" | entitydim = 2; input = {box8, adj48}
  int13: Intersection "Contact 13 Bottom Boundary" | entitydim = 2; input = {box8, adj49}
  int14: Intersection "Contact 14 Bottom Boundary" | entitydim = 2; input = {box8, adj50}
  int15: Intersection "Contact 15 Bottom Boundary" | entitydim = 2; input = {box8, adj51}
  int16: Intersection "Contact 16 Bottom Boundary" | entitydim = 2; input = {box8, adj52}
  box25: Box "Channel 1"
    entitydim = 3
    inputent = selections
    input = {geom1_imp1_Channel_dom}
    xmin = (cont1x+cont2x)/2-0.0001
    xmax = (cont1x+cont2x)/2+0.0001
    ymin = (cont1y+cont2y)/2-0.0001
    ymax = (cont1y+cont2y)/2+0.0001
    zmin = g_act-t_chan-0.0001
    zmax = g_act-t_chan+0.0001
  box26: Box "Channel 2"
    entitydim = 3
    inputent = selections
    input = {geom1_imp1_Channel_dom}
    xmin = (cont3x+cont4x)/2-0.0001
    xmax = (cont3x+cont4x)/2+0.0001
    ymin = (cont3y+cont4y)/2-0.0001
    ymax = (cont3y+cont4y)/2+0.0001
    zmin = g_act-t_chan-0.0001
    zmax = g_act-t_chan+0.0001
  box27: Box "Channel 3"
    entitydim = 3
    inputent = selections
    input = {geom1_imp1_Channel_dom}
    xmin = (cont5x+cont6x)/2-0.0001
    xmax = (cont5x+cont6x)/2+0.0001
    ymin = (cont5y+cont6y)/2-0.0001
    ymax = (cont5y+cont6y)/2+0.0001
    zmin = g_act-t_chan-0.0001
    zmax = g_act-t_chan+0.0001
  box28: Box "Channel 4"
    entitydim = 3
    inputent = selections
    input = {geom1_imp1_Channel_dom}
    xmin = (cont7x+cont8x)/2-0.0001
    xmax = (cont7x+cont8x)/2+0.0001
    ymin = (cont7y+cont8y)/2-0.0001
    ymax = (cont7y+cont8y)/2+0.0001
    zmin = g_act-t_chan-0.0001
    zmax = g_act-t_chan+0.0001
  box29: Box "Channel 5"
    entitydim = 3
    inputent = selections
    input = {geom1_imp1_Channel_dom}
    xmin = (cont9x+cont10x)/2-0.0001
    xmax = (cont9x+cont10x)/2+0.0001
    ymin = (cont9y+cont10y)/2-0.0001
    ymax = (cont9y+cont10y)/2+0.0001
    zmin = g_act-t_chan-0.0001
    zmax = g_act-t_chan+0.0001
  box30: Box "Channel 6"
    entitydim = 3
    inputent = selections
    input = {geom1_imp1_Channel_dom}
    xmin = (cont11x+cont12x)/2-0.0001
    xmax = (cont11x+cont12x)/2+0.0001
    ymin = (cont11y+cont12y)/2-0.0001
    ymax = (cont11y+cont12y)/2+0.0001
    zmin = g_act-t_chan-0.0001
    zmax = g_act-t_chan+0.0001
  box31: Box "Channel 7"
    entitydim = 3
    inputent = selections
    input = {geom1_imp1_Channel_dom}
    xmin = (cont13x+cont14x)/2-0.0001
    xmax = (cont13x+cont14x)/2+0.0001
    ymin = (cont13y+cont14y)/2-0.0001
    ymax = (cont13y+cont14y)/2+0.0001
    zmin = g_act-t_chan-0.0001
    zmax = g_act-t_chan+0.0001
  box32: Box "Channel 8"
    entitydim = 3
    inputent = selections
    input = {geom1_imp1_Channel_dom}
    xmin = (cont15x+cont16x)/2-0.0001
    xmax = (cont15x+cont16x)/2+0.0001
    ymin = (cont15y+cont16y)/2-0.0001
    ymax = (cont15y+cont16y)/2+0.0001
    zmin = g_act-t_chan-0.0001
    zmax = g_act-t_chan+0.0001
  uni4: Union "Contact Channel" | entitydim = 3; input = {geom1_imp1_Contact_dom, geom1_imp1_Channel_dom}
  adj4: Adjacent "Contact Channel Boundary"
    entitydim = 3
    input = {geom1_imp1_Channel_dom, geom1_imp1_Contact_dom}
    outputdim = 2
  adj9: Adjacent "Contact Channel 1 Boundary" | entitydim = 3; input = {box9, box10, box25}; outputdim = 2
  adj10: Adjacent "Contact Channel 2 Boundary" | entitydim = 3; input = {box11, box12, box26}; outputdim = 2
  adj11: Adjacent "Contact Channel 3 Boundary" | entitydim = 3; input = {box13, box14, box27}; outputdim = 2
  adj12: Adjacent "Contact Channel 4 Boundary" | entitydim = 3; input = {box15, box16, box28}; outputdim = 2
  adj13: Adjacent "Contact Channel 5 Boundary" | entitydim = 3; input = {box17, box18, box29}; outputdim = 2
  adj14: Adjacent "Contact Channel 6 Boundary" | entitydim = 3; input = {box19, box20, box30}; outputdim = 2
  adj15: Adjacent "Contact Channel 7 Boundary" | entitydim = 3; input = {box21, box22, box31}; outputdim = 2
  adj16: Adjacent "Contact Channel 8 Boundary" | entitydim = 3; input = {box23, box24, box32}; outputdim = 2
  box3: Box "Dielectric Layer with Anchor Bits"
    entitydim = 3
    zmin = g_act
    zmax = g_act + t_sp
    condition = allvertices
  dif1: Difference "Dielectric" | entitydim = 3; add = {box3}; subtract = {geom1_imp1_Anchor_dom}
  box5: Box "Gate"
    entitydim = 3
    inputent = selections
    input = {geom1_imp1_Substrate_Metal_dom}
    xmin = -L_plate/2
    xmax = L_plate/2
    ymin = -L_plate/2
    ymax = L_plate/2
    zmin = -t_sub
    zmax = 0
    condition = allvertices
  adj6: Adjacent "Gate Boundary" | entitydim = 3; input = {box5}; outputdim = 2
  uni1: Union "Components Above Substrate"
    entitydim = 3
    input = {geom1_imp1_Anchor_dom, geom1_imp1_Channel_dom, geom1_imp1_Contact_dom, geom1_imp1_Body_dom, geom1_imp1_Holes_dom}
  adj35: Adjacent "Components Above Substrate Boundary" | entitydim = 3; input = {uni1}; outputdim = 2
  uni2: Union "Substrate Components"
    entitydim = 3
    input = {geom1_imp1_Substrate_Metal_dom, geom1_imp1_Substrate_Gap_dom, geom1_imp1_Substrate_Landing_Pads_dom, geom1_csel1_dom}
  adj36: Adjacent "Substrate Components Boundary" | entitydim = 3; input = {uni2}; outputdim = 2
  dif2: Difference "Solids" | entitydim = 3; add = {uni1, uni2}
  adj7: Adjacent "Solids Boundary" | entitydim = 3; input = {dif2}; outputdim = 2
  dif3: Difference "Enclosure Only" | entitydim = 3; add = {geom1_sph1_dom}; subtract = {dif2}
  adj2: Adjacent "Enclosure Only Boundary" | entitydim = 3; input = {geom1_sph1_dom}; outputdim = 2
  box33: Box "Landing Pad 1"
    entitydim = 3
    inputent = selections
    input = {geom1_imp1_Substrate_Landing_Pads_dom}
    xmin = cont1x-0.0001
    xmax = cont1x+0.0001
    ymin = cont1y-0.0001
    ymax = cont1y+0.0001
    zmin = -0.0001
    zmax = 0.0001
  box34: Box "Landing Pad 2"
    entitydim = 3
    inputent = selections
    input = {geom1_imp1_Substrate_Landing_Pads_dom}
    xmin = cont2x-0.0001
    xmax = cont2x+0.0001
    ymin = cont2y-0.0001
    ymax = cont2y+0.0001
    zmin = -0.0001
    zmax = 0.0001
  box35: Box "Landing Pad 3"
    entitydim = 3
    inputent = selections
    input = {geom1_imp1_Substrate_Landing_Pads_dom}
    xmin = cont3x-0.0001
    xmax = cont3x+0.0001
    ymin = cont3y-0.0001
    ymax = cont3y+0.0001
    zmin = -0.0001
    zmax = 0.0001
  box36: Box "Landing Pad 4"
    entitydim = 3
    inputent = selections
    input = {geom1_imp1_Substrate_Landing_Pads_dom}
    xmin = cont4x-0.0001
    xmax = cont4x+0.0001
    ymin = cont4y-0.0001
    ymax = cont4y+0.0001
    zmin = -0.0001
    zmax = 0.0001
  box37: Box "Landing Pad 5"
    entitydim = 3
    inputent = selections
    input = {geom1_imp1_Substrate_Landing_Pads_dom}
    xmin = cont5x-0.0001
    xmax = cont5x+0.0001
    ymin = cont5y-0.0001
    ymax = cont5y+0.0001
    zmin = -0.0001
    zmax = 0.0001
  box38: Box "Landing Pad 6"
    entitydim = 3
    inputent = selections
    input = {geom1_imp1_Substrate_Landing_Pads_dom}
    xmin = cont6x-0.0001
    xmax = cont6x+0.0001
    ymin = cont6y-0.0001
    ymax = cont6y+0.0001
    zmin = -0.0001
    zmax = 0.0001
  box39: Box "Landing Pad 7"
    entitydim = 3
    inputent = selections
    input = {geom1_imp1_Substrate_Landing_Pads_dom}
    xmin = cont7x-0.0001
    xmax = cont7x+0.0001
    ymin = cont7y-0.0001
    ymax = cont7y+0.0001
    zmin = -0.0001
    zmax = 0.0001
  box40: Box "Landing Pad 8"
    entitydim = 3
    inputent = selections
    input = {geom1_imp1_Substrate_Landing_Pads_dom}
    xmin = cont8x-0.0001
    xmax = cont8x+0.0001
    ymin = cont8y-0.0001
    ymax = cont8y+0.0001
    zmin = -0.0001
    zmax = 0.0001
  box41: Box "Landing Pad 9"
    entitydim = 3
    inputent = selections
    input = {geom1_imp1_Substrate_Landing_Pads_dom}
    xmin = cont9x-0.0001
    xmax = cont9x+0.0001
    ymin = cont9y-0.0001
    ymax = cont9y+0.0001
    zmin = -0.0001
    zmax = 0.0001
  box42: Box "Landing Pad 10"
    entitydim = 3
    inputent = selections
    input = {geom1_imp1_Substrate_Landing_Pads_dom}
    xmin = cont10x-0.0001
    xmax = cont10x+0.0001
    ymin = cont10y-0.0001
    ymax = cont10y+0.0001
    zmin = -0.0001
    zmax = 0.0001
  box43: Box "Landing Pad 11"
    entitydim = 3
    inputent = selections
    input = {geom1_imp1_Substrate_Landing_Pads_dom}
    xmin = cont11x-0.0001
    xmax = cont11x+0.0001
    ymin = cont11y-0.0001
    ymax = cont11y+0.0001
    zmin = -0.0001
    zmax = 0.0001
  box44: Box "Landing Pad 12"
    entitydim = 3
    inputent = selections
    input = {geom1_imp1_Substrate_Landing_Pads_dom}
    xmin = cont12x-0.0001
    xmax = cont12x+0.0001
    ymin = cont12y-0.0001
    ymax = cont12y+0.0001
    zmin = -0.0001
    zmax = 0.0001
  box45: Box "Landing Pad 13"
    entitydim = 3
    inputent = selections
    input = {geom1_imp1_Substrate_Landing_Pads_dom}
    xmin = cont13x-0.0001
    xmax = cont13x+0.0001
    ymin = cont13y-0.0001
    ymax = cont13y+0.0001
    zmin = -0.0001
    zmax = 0.0001
  box46: Box "Landing Pad 14"
    entitydim = 3
    inputent = selections
    input = {geom1_imp1_Substrate_Landing_Pads_dom}
    xmin = cont14x-0.0001
    xmax = cont14x+0.0001
    ymin = cont14y-0.0001
    ymax = cont14y+0.0001
    zmin = -0.0001
    zmax = 0.0001
  box47: Box "Landing Pad 15"
    entitydim = 3
    inputent = selections
    input = {geom1_imp1_Substrate_Landing_Pads_dom}
    xmin = cont15x-0.0001
    xmax = cont15x+0.0001
    ymin = cont15y-0.0001
    ymax = cont15y+0.0001
    zmin = -0.0001
    zmax = 0.0001
  box48: Box "Landing Pad 16"
    entitydim = 3
    inputent = selections
    input = {geom1_imp1_Substrate_Landing_Pads_dom}
    xmin = cont16x-0.0001
    xmax = cont16x+0.0001
    ymin = cont16y-0.0001
    ymax = cont16y+0.0001
    zmin = -0.0001
    zmax = 0.0001
  adj5: Adjacent "Landing Pads Boundary" | entitydim = 3; input = {geom1_imp1_Substrate_Landing_Pads_dom}; outputdim = 2
  adj18: Adjacent "Landing Pad 1 Boundary" | entitydim = 3; input = {box33}; outputdim = 2
  adj19: Adjacent "Landing Pad 2 Boundary" | entitydim = 3; input = {box34}; outputdim = 2
  adj20: Adjacent "Landing Pad 3 Boundary" | entitydim = 3; input = {box35}; outputdim = 2
  adj21: Adjacent "Landing Pad 4 Boundary" | entitydim = 3; input = {box36}; outputdim = 2
  adj22: Adjacent "Landing Pad 5 Boundary" | entitydim = 3; input = {box37}; outputdim = 2
  adj23: Adjacent "Landing Pad 6 Boundary" | entitydim = 3; input = {box38}; outputdim = 2
  adj24: Adjacent "Landing Pad 7 Boundary" | entitydim = 3; input = {box39}; outputdim = 2
  adj25: Adjacent "Landing Pad 8 Boundary" | entitydim = 3; input = {box40}; outputdim = 2
  adj26: Adjacent "Landing Pad 9 Boundary" | entitydim = 3; input = {box41}; outputdim = 2
  adj27: Adjacent "Landing Pad 10 Boundary" | entitydim = 3; input = {box42}; outputdim = 2
  adj28: Adjacent "Landing Pad 11 Boundary" | entitydim = 3; input = {box43}; outputdim = 2
  adj29: Adjacent "Landing Pad 12 Boundary" | entitydim = 3; input = {box44}; outputdim = 2
  adj30: Adjacent "Landing Pad 13 Boundary" | entitydim = 3; input = {box45}; outputdim = 2
  adj31: Adjacent "Landing Pad 14 Boundary" | entitydim = 3; input = {box46}; outputdim = 2
  adj32: Adjacent "Landing Pad 15 Boundary" | entitydim = 3; input = {box47}; outputdim = 2
  adj33: Adjacent "Landing Pad 16 Boundary" | entitydim = 3; input = {box48}; outputdim = 2

Common definitions
  free3: DeformingDomain on selection dif3 | smoothingType = hyperelastic
  sym1: Symmetry "Symmetry/Roller" on selection adj2
  mpf1: ParticipationFactors
  mpf2: ParticipationFactors

Geometry
  geom1 "Relay Geometry" (3D, length unit µm)
    imp1: Import "Import from GDS"
      type = ecad
      filename = ../layouts/relay.gds
      ecadtype = gds
      fileunit = µm
      manualelevation = on
      layername = {Anchor, Channel, Contact, Body, Holes, Substrate Metal, Substrate Gap, Substrate Landing Pads}
      height = {g_act + t_sp, t_chan, (t_cont - gaptol), t_poly+t_sp, t_poly+t_sp, t_sub, t_sub, t_sub}
      elevation = {0, g_act-t_chan, g_act-(t_cont - gaptol), g_act, g_act, -t_sub, -t_sub, -t_sub}
      importlayer = {on, on, on, on, on, on, on, on}
      layerdeftype = manualelevationshowname
      layerprop = {{LAYER1, Metal}, {LAYER2, Metal}, {LAYER3, Metal}, {LAYER4, Metal}, {LAYER5, Metal}, {LAYER6, Metal}, {LAYER7, Metal}, {LAYER8, Metal}}
      repairgeom = off
    dif1: Difference "Remove Body Holes" | input = selection imp1_Body.obj; input2 = selection imp1_Holes.obj
    blk2: Block "Substrate" | pos = {0, 0, -t_sub/2}; base = center; size = {L_plate*2.5, L_plate*2.5, t_sub}
    dif2: Difference "Remove Substrate Metal Gaps"
      input = selection imp1_Substrate_Metal.obj
      input2 = selection imp1_Substrate_Gap.obj
    dif3: Difference "Remove Metal from Substrate Dielectric"
      input = selection blk2
      input2 = selection imp1_Substrate_Metal.obj
      keep = on
    dif4: Difference "Remove Landing Pads from Substrate Dielectric 1"
      contributeto = csel1
      input = dif3
      input2 = selection imp1_Substrate_Landing_Pads.obj
      keep = on
    del1: Delete "Delete Old Substrate" | input = blk2
    wp1: WorkPlane "Split Body Plane" | quickz = g_act + t_sp; unite = on
    pard1: PartitionDomains "Partition Body Domain" | domain = selection imp1_Body.dom; workplane = wp1
    boxsel3: BoxSelection "Poly"
      entitydim = 3
      zmin = g_act + t_poly + t_sp
      zmax = g_act + t_poly + t_sp
      condition = somevertex
    blk1: Block "Poly Cut Block" | pos = {-L_plate/2, -L_plate/2, 0}; size = {L_plate, L_plate, g_act + t_poly + t_sp}
    pard2: PartitionDomains "Partition Poly"
      domain = selection boxsel3
      partitionwith = objects
      workplane = wp1
      object = blk1
      keepobject = off
    sph1: Sphere "Sphere Enclosure" | r = 2*L_plate
    fin: Finalize "Form Union"

Materials
  mat15: Common "Air" on selection dif3
    def "Basic"
      thermalexpansioncoefficient = alpha_p(pA,T)
      molarmass = 0.02897
      bulkviscosity = muB(T)
      relpermeability = 1
      relpermittivity = 1
      dynamicviscosity = eta(T)
      ratioofspecificheat = 1.4
      electricconductivity = 0[S/m]
      heatcapacity = Cp(T)
      density = rho(pA,T)
      thermalconductivity = k(T)
      soundspeed = cs(T)
      eta: Piecewise | arg = T; pieces = {200.0, 1600.0, -8.38278E-7+8.35717342E-8*T^1-7.69429583E-11*T^2+4.6437266E-14*T^3-1.06585607E-17*T^4}; argunit = K; fununit = Pa*s
      Cp: Piecewise | arg = T; pieces = {200.0, 1600.0, 1047.63657-0.372589265*T^1+9.45304214E-4*T^2-6.02409443E-7*T^3+1.2858961E-10*T^4}; argunit = K; fununit = J/(kg*K)
      rho: Analytic | expr = pA*0.02897/R_const[K*mol/J]/T; args = {pA, T}; dermethod = manual; argders = {{pA, d(pA*0.02897/R_const/T,pA)}, {T, d(pA*0.02897/R_const/T,T)}}; argunit = Pa,K; fununit = kg/m^3
      k: Piecewise | arg = T; pieces = {200.0, 1600.0, -0.00227583562+1.15480022E-4*T^1-7.90252856E-8*T^2+4.11702505E-11*T^3-7.43864331E-15*T^4}; argunit = K; fununit = W/(m*K)
      cs: Analytic | expr = sqrt(1.4*R_const[K*mol/J]/0.02897*T); args = T; dermethod = manual; argunit = K; fununit = m/s
      an1: Analytic | funcname = alpha_p; expr = -1/rho(pA,T)*d(rho(pA,T),T); args = {pA, T}; argunit = Pa,K; fununit = 1/K
      an2: Analytic "Analytic 2a" | funcname = muB; expr = 0.6*eta(T); args = T; argunit = K; fununit = Pa*s
    RefractiveIndex
      n = 1
      ki = 0
    NonlinearModel
      BA = (def.gamma+1)/2
  mat7: Common "Body - Poly-SiGe" on selection uni3
    def "Basic"
      resistivity = 1.49e-5
      thermalexpansioncoefficient = 2.6e-6[1/K]
      heatcapacity = 678[J/(kg*K)]
      relpermittivity = 4.5
      density = 4126[kg/m^3]
      thermalconductivity = 34[W/(m*K)]
    Enu "Young's modulus and Poisson's ratio"
      youngsmodulus = 145e9[Pa]
      poissonsratio = 0.27193
  mat8: Common "Contact Channel - Tungsten" on selection uni4
    def "Basic"
      electricconductivity = 20.0e6[S/m]
      thermalexpansioncoefficient = 4.5e-6[1/K]
      heatcapacity = 132[J/(kg*K)]
      density = 19350[kg/m^3]
      thermalconductivity = 174[W/(m*K)]
      relpermittivity = 1
    Enu "Young's modulus and Poisson's ratio"
      youngsmodulus = 411e9[Pa]
      poissonsratio = 0.28
  mat11: Common "Dielectric - Aluminum Oxide" on selection dif1
    def "Basic"
      electricconductivity = 0[S/m]
      thermalexpansioncoefficient = 6.5e-6[1/K]
      heatcapacity = 730[J/(kg*K)]
      relpermittivity = 5.7
      density = 3965[kg/m^3]
      thermalconductivity = 35[W/(m*K)]
    Enu "Young's modulus and Poisson's ratio"
      youngsmodulus = 400e9[Pa]
      poissonsratio = 0.22
  mat12: Common "Substrate Metal - Aluminum" on selection geom1_imp1_Substrate_Metal_dom
    def "Basic"
      thermalconductivity = k_solid_bulk_1(T[1/K])[W/(m*K)]
      resistivity = res_solid_1(T[1/K])[ohm*m]
      thermalexpansioncoefficient = (alpha_solid_1(T[1/K])[1/K]+(Tempref-293[K])*if(abs(T-Tempref)>1e-3,(alpha_solid_1(T[1/K])[1/K]-alpha_solid_1(Tempref[1/K])[1/K])/(T-Tempref),d(alpha_solid_1(T[1/K])[1/K],T)))/(1+alpha_solid_1(Tempref[1/K])[1/K]*(Tempref-293[K]))
      heatcapacity = C_solid_1(T[1/K])[J/(kg*K)]
      electricconductivity = sigma_solid_1(T[1/K])[S/m]
      HC = HC_solid_1(T[1/K])[J/(mol*K)]
      VP = VP_solid_1(T[1/K])[Pa]
      density = rho_solid_1(T[1/K])[kg/m^3]
      TD = TD_solid_1(T[1/K])[m^2/s]
      relpermittivity = 1
      k_solid_bulk_1: Piecewise
        arg = T
        pieces = 
          {0.0, 14.0, 3895.7*T^1+203.42*T^2-56.434*T^3+2.0664*T^4}
          {14.0, 50.0, 49148.0-2950.9*T^1+63.175*T^2-0.46605*T^3}
          {50.0, 82.0, 15117.0-626.0*T^1+10.348*T^2-0.078676*T^3+2.2917E-4*T^4}
          {82.0, 297.0, 913.09-12.076*T^1+0.080875*T^2-2.3988E-4*T^3+2.6487E-7*T^4}
          {297.0, 933.0, 39.646+1.684*T^1-0.0054134*T^2+8.4313E-6*T^3-6.537E-9*T^4+2.002E-12*T^5}
      res_solid_1: Piecewise
        arg = T
        pieces = 
          {1.0, 19.5, 1.091612E-12-1.10726E-13*T^1+3.696901E-14*T^2-2.781934E-15*T^3+1.008733E-16*T^4}
          {19.5, 50.6, -3.323487E-11+7.29041E-12*T^1-4.771551E-13*T^2+1.071535E-14*T^3}
          {50.6, 200.0, 1.0445563E-10-3.988929E-11*T^1+1.061978E-12*T^2-2.337666E-15*T^3}
          {200.0, 933.0, -1.037048E-8+1.451201E-10*T^1-8.192563E-14*T^2+6.619834E-17*T^3}
      alpha_solid_1: Piecewise
        arg = T
        pieces = 
          {20.0, 220.0, 1.371347E-5+7.808536E-8*T^1-2.568882E-10*T^2+3.615726E-13*T^3}
          {220.0, 610.0, 5.760185E-6+1.707141E-7*T^1-6.548135E-10*T^2+1.220625E-12*T^3-1.064883E-15*T^4+3.535918E-19*T^5}
          {610.0, 933.0, 1.9495E-5+9.630182E-9*T^1+9.462013E-13*T^2}
      C_solid_1: Piecewise
        arg = T
        pieces = 
          {100.0, 320.0, -290.416126+11.1810036*T^1-0.0412540099*T^2+7.11275398E-5*T^3-4.60821994E-8*T^4}
          {320.0, 933.0, 595.658507+1.51302896*T^1-0.00207006538*T^2+1.30360846E-6*T^3}
      sigma_solid_1: Piecewise
        arg = T
        pieces = 
          {1.0, 19.5, 1/(1.008733E-16*T^4-2.781934E-15*T^3+3.696901E-14*T^2-1.107260E-13*T+1.091612E-12)}
          {19.5, 50.6, 1/(1.071535E-14*T^3-4.771551E-13*T^2+7.290410E-12*T-3.323487E-11)}
          {50.6, 200.0, 1/(-2.337666E-15*T^3+1.061978E-12*T^2-3.988929E-11*T+1.0445563E-10)}
          {200.0, 933.0, 1/(6.619834E-17*T^3-8.192563E-14*T^2+1.451201E-10*T-1.037048E-08)}
      HC_solid_1: Piecewise
        arg = T
        pieces = 
          {100.0, 320.0, -7.83586214+0.301680207*T^1-0.00111309504*T^2+1.91912758E-6*T^3-1.24336723E-9*T^4}
          {320.0, 933.0, 16.0717565+0.0408237901*T^1-5.58534712E-5*T^2+3.51733064E-8*T^3}
      VP_solid_1: Piecewise | arg = T; pieces = {293.0, 933.0, (exp((-1.73420000e+04/T-7.92700000e-01*log10(T)+1.23398100e+01)*log(10.0)))*1.33320000e+02}
      rho_solid_1: Piecewise
        arg = T
        pieces = 
          {20.0, 130.0, 2734.317-0.02751647*T^1+0.001016054*T^2-1.700864E-5*T^3+5.734155E-8*T^4}
          {130.0, 933.0, 2736.893-0.006011681*T^1-7.012444E-4*T^2+1.3582E-6*T^3-1.367828E-9*T^4+5.177991E-13*T^5}
      TD_solid_1: Piecewise
        arg = T
        pieces = 
          {100.0, 199.0, 0.002133702-4.812031E-5*T^1+4.79456E-7*T^2-2.464699E-9*T^3+6.456561E-12*T^4-6.843904E-15*T^5}
          {199.0, 384.0, -2.668677E-4+8.197942E-6*T^1-6.451378E-8*T^2+2.363432E-10*T^3-4.135319E-13*T^4+2.797142E-16*T^5}
          {384.0, 933.0, 1.171846E-4-7.450324E-8*T^1+5.694632E-11*T^2-4.064992E-14*T^3}
    ThermalExpansion
      alphatan = CTE_solid_1(T[1/K])[1/K]
      dL = (dL_solid_1(T[1/K])-dL_solid_1(Tempref[1/K]))/(1+dL_solid_1(Tempref[1/K]))
      alphatanIso = CTE_solid_1(T[1/K])[1/K]
      dLIso = (dL_solid_1(T[1/K])-dL_solid_1(Tempref[1/K]))/(1+dL_solid_1(Tempref[1/K]))
      dL_solid_1: Piecewise
        arg = T
        pieces = 
          {20.0, 188.0, -0.004116601-4.000347E-6*T^1+5.370388E-8*T^2+3.714324E-10*T^3-1.45073E-12*T^4}
          {188.0, 933.0, -0.00631208932+2.156284E-5*T^1-4.744254E-9*T^2+1.811015E-11*T^3-7.336673E-15*T^4}
      CTE_solid_1: Piecewise
        arg = T
        pieces = 
          {20.0, 79.0, -3.317274E-6+3.068688E-7*T^1-1.004816E-8*T^2+1.724768E-10*T^3-8.846061E-13*T^4}
          {79.0, 230.0, -2.288925E-5+6.674915E-7*T^1-4.402622E-9*T^2+1.455358E-11*T^3-1.910622E-14*T^4}
          {230.0, 900.0, 1.24296E-5+5.050772E-8*T^1-5.806556E-11*T^2+3.014305E-14*T^3}
    Enu "Young's modulus and Poisson's ratio"
      youngsmodulus = E(T[1/K])[Pa]
      poissonsratio = nu(T[1/K])
      E: Piecewise | arg = T; pieces = {0.0, 773.0, 7.659324E10+2007396.0*T^1-186458.4*T^2+419.2175*T^3-0.3495083*T^4}
      nu: Piecewise | arg = T; pieces = {0.0, 773.0, 0.3238668+3.754548E-6*T^1+2.213647E-7*T^2-6.565023E-10*T^3+4.21277E-13*T^4+3.170505E-16*T^5}
    KG "Bulk modulus and shear modulus"
      K = kappa(T[1/K])[Pa]
      G = mu(T[1/K])[Pa]
      mu: Piecewise | arg = T; pieces = {0.0, 773.0, 2.894653E10-120032.4*T^1-69037.36*T^2+158.6722*T^3-0.1348974*T^4}
      kappa: Piecewise | arg = T; pieces = {0.0, 773.0, 7.252413E10+1872882.0*T^1-71106.44*T^2+52.7109*T^3}
  mat13: Common "Substrate Landing Pads - Tungsten" on selection geom1_imp1_Substrate_Landing_Pads_dom
    // same settings as mat8
  mat14: Common "Substrate Dielectric - SiO2" on selection geom1_csel1_dom
    def "Basic"
      electricconductivity = 0[S/m]
      thermalexpansioncoefficient = 0.5e-6[1/K]
      heatcapacity = 730[J/(kg*K)]
      relpermittivity = 4.2
      density = 2200[kg/m^3]
      thermalconductivity = 1.4[W/(m*K)]
    Enu "Young's modulus and Poisson's ratio"
      youngsmodulus = 70e9[Pa]
      poissonsratio = 0.17
  mat16: Common "Air 1"
    def "Basic"
      thermalexpansioncoefficient = alpha_p(pA,T)
      molarmass = 0.02897
      bulkviscosity = muB(T)
      dynamicviscosity = eta(T)
      ratioofspecificheat = 1.4
      electricconductivity = 0[S/m]
      heatcapacity = Cp(T)
      density = rho(pA,T)
      thermalconductivity = k(T)
      soundspeed = cs(T)
      eta: Piecewise | arg = T; pieces = {200.0, 1600.0, -8.38278E-7+8.35717342E-8*T^1-7.69429583E-11*T^2+4.6437266E-14*T^3-1.06585607E-17*T^4}; argunit = K; fununit = Pa*s
      Cp: Piecewise | arg = T; pieces = {200.0, 1600.0, 1047.63657-0.372589265*T^1+9.45304214E-4*T^2-6.02409443E-7*T^3+1.2858961E-10*T^4}; argunit = K; fununit = J/(kg*K)
      rho: Analytic | expr = pA*0.02897/R_const[K*mol/J]/T; args = {pA, T}; dermethod = manual; argders = {{pA, d(pA*0.02897/R_const/T,pA)}, {T, d(pA*0.02897/R_const/T,T)}}; argunit = Pa,K; fununit = kg/m^3
      k: Piecewise | arg = T; pieces = {200.0, 1600.0, -0.00227583562+1.15480022E-4*T^1-7.90252856E-8*T^2+4.11702505E-11*T^3-7.43864331E-15*T^4}; argunit = K; fununit = W/(m*K)
      cs: Analytic | expr = sqrt(1.4*R_const[K*mol/J]/0.02897*T); args = T; dermethod = manual; argunit = K; fununit = m/s
      an1: Analytic | funcname = alpha_p; expr = -1/rho(pA,T)*d(rho(pA,T),T); args = {pA, T}; argunit = Pa, K; fununit = 1/K
      an2: Analytic "Analytic 2a" | funcname = muB; expr = 0.6*eta(T); args = T; argunit = K; fununit = Pa*s
    NonlinearModel
      BA = (def.gamma+1)/2

Physics
  es: Electrostatics on all domains
    dependent variable V
    ShapeProperty.order_electricpotential = 1
    ccn1: ChargeConservation "Charge Conservation, Solid" (default) | materialType = solid
    zc1: ZeroCharge (default)
    init1: init "Initial Values" (default)
    term6: Terminal "Electric Potential Gate Sweep" on selection adj6
      TerminalName = 101
      TerminalType = Voltage
      V0 = tri1(t[1/s])*V_gate_max
    term61: Terminal "Electric Potential Gate Step Down" on selection adj6
      TerminalName = 103
      TerminalType = Voltage
      V0 = rect1(t[1/s])*V_gate_op
    term7: Terminal "Ground" on selection uni5 | TerminalName = 102; TerminalType = Voltage; V0 = 0
    ccn2: ChargeConservation "Charge Conservation, Nonsolid" on selection dif3
    term41: Terminal "Floating Channel 1" on selection adj9 | TerminalName = 1011
    term42: Terminal "Floating Channel 2" on selection adj10 | TerminalName = 1012
    term43: Terminal "Floating Channel 3" on selection adj11 | TerminalName = 1013
    term44: Terminal "Floating Channel 4" on selection adj12 | TerminalName = 1014
    term45: Terminal "Floating Channel 5" on selection adj13 | TerminalName = 1015
    term46: Terminal "Floating Channel 6" on selection adj14 | TerminalName = 1016
    term47: Terminal "Floating Channel 7" on selection adj15 | TerminalName = 1017
    term48: Terminal "Floating Channel 8" on selection adj16 | TerminalName = 1018
    term37: Terminal "Floating Landing Pad 1" on selection adj18 | TerminalName = 1021
    term38: Terminal "Floating Landing Pad 2" on selection adj19 | TerminalName = 1022
    term39: Terminal "Floating Landing Pad 3" on selection adj20 | TerminalName = 1023
    term40: Terminal "Floating Landing Pad 4" on selection adj21 | TerminalName = 1024
    term49: Terminal "Floating Landing Pad 5" on selection adj22 | TerminalName = 1025
    term50: Terminal "Floating Landing Pad 6" on selection adj23 | TerminalName = 1026
    term51: Terminal "Floating Landing Pad 7" on selection adj24 | TerminalName = 1027
    term52: Terminal "Floating Landing Pad 8" on selection adj25 | TerminalName = 1028
    term53: Terminal "Floating Landing Pad 9" on selection adj26 | TerminalName = 1029
    term54: Terminal "Floating Landing Pad 10" on selection adj27 | TerminalName = 1030
    term55: Terminal "Floating Landing Pad 11" on selection adj28 | TerminalName = 1031
    term56: Terminal "Floating Landing Pad 12" on selection adj29 | TerminalName = 1032
    term57: Terminal "Floating Landing Pad 13" on selection adj30 | TerminalName = 1033
    term58: Terminal "Floating Landing Pad 14" on selection adj31 | TerminalName = 1034
    term59: Terminal "Floating Landing Pad 15" on selection adj32 | TerminalName = 1035
    term60: Terminal "Floating Landing Pad 16" on selection adj33 | TerminalName = 1036
  es2: Electrostatics "Parasitic Extraction" on all domains
    dependent variable V2
    ccn1: ChargeConservation "Charge Conservation, Solid" (default) | materialType = solid
    zc1: ZeroCharge (default)
    init1: init "Initial Values" (default)
    gnd1: Ground "Enclosure Ground" on selection adj2
    term6: Terminal "Gate" on selection adj6
    term7: Terminal "Body" on selection uni5 | V0 = 0
    ccn2: ChargeConservation "Charge Conservation, Nonsolid" on selection dif3
    term41: Terminal "Floating Channel 1" on selection adj9 | V0 = 0
    term42: Terminal "Floating Channel 2" on selection adj10 | V0 = 0
    term43: Terminal "Floating Channel 3" on selection adj11 | V0 = 0
    term44: Terminal "Floating Channel 4" on selection adj12 | V0 = 0
    term45: Terminal "Floating Channel 5" on selection adj13 | V0 = 0
    term46: Terminal "Floating Channel 6" on selection adj14 | V0 = 0
    term47: Terminal "Floating Channel 7" on selection adj15 | V0 = 0
    term48: Terminal "Floating Channel 8" on selection adj16 | V0 = 0
    term37: Terminal "Floating Landing Pad 1" on selection adj18 | V0 = 0
    term38: Terminal "Floating Landing Pad 2" on selection adj19 | V0 = 0
    term39: Terminal "Floating Landing Pad 3" on selection adj20 | V0 = 0
    term40: Terminal "Floating Landing Pad 4" on selection adj21 | V0 = 0
    term49: Terminal "Floating Landing Pad 5" on selection adj22 | V0 = 0
    term50: Terminal "Floating Landing Pad 6" on selection adj23 | V0 = 0
    term51: Terminal "Floating Landing Pad 7" on selection adj24 | V0 = 0
    term52: Terminal "Floating Landing Pad 8" on selection adj25 | V0 = 0
    term53: Terminal "Floating Landing Pad 9" on selection adj26 | V0 = 0
    term54: Terminal "Floating Landing Pad 10" on selection adj27 | V0 = 0
    term55: Terminal "Floating Landing Pad 11" on selection adj28 | V0 = 0
    term56: Terminal "Floating Landing Pad 12" on selection adj29 | V0 = 0
    term57: Terminal "Floating Landing Pad 13" on selection adj30 | V0 = 0
    term58: Terminal "Floating Landing Pad 14" on selection adj31 | V0 = 0
    term59: Terminal "Floating Landing Pad 15" on selection adj32 | V0 = 0
    term60: Terminal "Floating Landing Pad 16" on selection adj33 | V0 = 0
  solid: SolidMechanics "Solid Mechanics Quasi-Static" on all domains
    dependent variable u = {u, v, w}
    StructuralTransientBehavior.StructuralTransientBehavior = Quasistatic
    lemm1: LinearElasticModel "Linear Elastic Material Relay" (default)
      dmp2: Damping on all domains | alpha_dM = 5e7; zeta1 = 1; zeta2 = 1; eta_s_mat = userdef; eta_s = damping
    free1: Free (default)
    init1: init "Initial Values" (default)
    bndl1: BoundaryLoad "Boundary Load Relay Plate" on selection box2
      LoadType = TotalForce
      Ftot = {0, 0, -F_spr}
      FperArea = {0, 0, -1e-8}
    fix1: Fixed "Fixed Constraint Substrate Components" on selection adj36
    bndl10: BoundaryLoad "Contact Pressure Body" on selection box7 | FperArea = {0, 0, Pc_body}
    bndl11: BoundaryLoad "Contact Pressure Contact" on selection box8 | FperArea = {0, 0, Pc_cont}
  solid2: SolidMechanics "Solid Mechanics Transient" on all domains
    dependent variable u2 = {u2, v2, w2}
    cref.cref = solid.cp
    lemm1: LinearElasticModel "Linear Elastic Material Relay" (default)
      dmp1: Damping on all domains | alpha_dM = 1e8
    free1: Free (default)
    init1: init "Initial Values" (default)
    fix1: Fixed "Fixed Constraint Substrate Components" on boundaries 5-9, 16, 24, 29, 32, 42, 45, 78, 85, 132, 133, 141, 142, 173, 174, 178, 179, 184, 201, 202, 223, 224, 234, 235, 264-266, 275, 276, 281, 352, 353, 357, 358, 362, 363, 377, 378, 438-441, 449-451, 512, 513, 529, 530, 544, 545, 560, 561, 583, 584, 610, 611, 626, 627, 641-643, 680, 681, 690, 757, 769, 772, 782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
    bndl10: BoundaryLoad "Contact Pressure Body" on selection box7 | FperArea = {0, 0, Pc_body2}
    bndl11: BoundaryLoad "Contact Pressure Contact" on selection box8 | FperArea = {0, 0, Pc_cont2}

Multiphysics
  eme1: Electrostriction "Electromechanical Forces 1" on all domains | Solid_physics = solid; Electrostatics_physics = es
  eme2: Electrostriction "Electromechanical Forces 2" on all domains | Solid_physics = solid2; Electrostatics_physics = es

Mesh
  mesh1 "Compact Relay Mesh"
    size: MeshSizeDefault | hmin = 0.005; custom = on
    ftri8: FreeTri "Free Triangular" on all boundaries
    ftet1: FreeTet "Free Tetrahedral" on remaining entities | optlevel = medium; optcurved = on; optsmall = on
  mesh3 "Full Relay Mesh"
    size: MeshSizeDefault | hmin = 0.005; custom = on
    ftet1: FreeTet "Free Tetrahedral" on remaining entities | optlevel = medium; optcurved = on; optsmall = on

Studies
  std1 "Spring Constant"
    stat: Stationary
      solve for = {solid}
      disabledphysics = {solid/bndl10, solid/bndl11, es, es2, solid2}
      disableFrameControl = {frame:spatial1, solid2}
      disabledcoupling = {eme1, eme2}
      activateCoupling = {eme1, off, eme2, off}
      mesh = {geom1, mesh1}
  std2 "Modal Analysis"
    eig: Eigenfrequency
      shift = 1[Hz]
      solve for = {solid}
      disabledphysics = {es, es2, solid2, solid/bndl1, solid/bndl10, solid/bndl11, solid/lemm1/dmp2}
      disableFrameControl = {frame:spatial1, solid2}
      disabledcoupling = {eme1, eme2}
      activateCoupling = {eme1, off, eme2, off}
      mesh = {geom1, mesh1}
  std4 "Parasitic Extraction"
    stssw: StationarySourceSweep
      plist = range(1,1,26)
      solve for = {es2}
      disableFrameControl = {frame:spatial1, solid, solid2}
      activateCoupling = {eme1, off, eme2, off}
      mesh = {geom1, mesh1}
  std3 "Quasi-Static Sweep"
    time: Transient "Time Dependent"
      tlist = range(0,1e-7,4e-5)
      usertol = on
      rtol = 0.00001
      solve for = {es, solid}
      disabledphysics = {es2, solid2, es/term61, solid/bndl1}
      disabledcoupling = eme2
      activateCoupling = {eme1, on, eme2, off}
      mesh = {geom1, mesh1}
  std5 "Transient Sweep"
    time: Transient "Time Dependent"
      tlist = range(0,1e-10,5e-8)
      usertol = on
      rtol = 0.00001
      solve for = {es, solid2}
      disabledphysics = {es2, es/term6, solid}
      disableFrameControl = solid
      disabledcoupling = eme1
      mesh = {geom1, mesh1}

Solver configurations
  sol1 "Solution 1" (study std1)
    v1: Variables "Dependent Variables 1"
    s1: Stationary "Stationary Solver 1"
      dDef: Direct
      fc1: FullyCoupled
  sol2 "Solution 2" (study std2)
    v1: Variables "Dependent Variables 1"
    e1: Eigenvalue "Eigenvalue Solver 1" | transform = eigenfrequency; shift = 1[Hz]; storelinpoint = on
      dDef: Direct
  sol3 "Solution 3" (study std4)
    v1: Variables "Dependent Variables 1"
    s1: Stationary "Stationary Solver 1"
      dDef: Direct
      p1: Parametric | pname = PortName; plistarr = range(1,1,26); pcontinuationmode = no
      fc1: FullyCoupled
  sol4 "Solution 4" (study std3)
    v1: Variables "Dependent Variables 1"
      relay_spatial_disp: Field "Spatial mesh displacement (relay.spatial.disp)"
        scalemethod = manual
        scaleval = 2.07846096908e-07
      relay_u: Field "Displacement field (relay.u)" | scalemethod = manual; scaleval = 1e-2*2.07846096908e-05
    t1: Time "Time-Dependent Solver 1" | tlist = range(0,1e-7,4e-5); rtol = 1.0E-5
      dDef: Direct
      se1: Segregated
        ss1: SegregatedStep "Electric potential"
          segvar = {relay_V, relay_es_term41_V0_ode, relay_es_term42_V0_ode, relay_es_term43_V0_ode, relay_es_term44_V0_ode, relay_es_term45_V0_ode, relay_es_term46_V0_ode, relay_es_term47_V0_ode, relay_es_term48_V0_ode, relay_es_term37_V0_ode, relay_es_term38_V0_ode, relay_es_term39_V0_ode, relay_es_term40_V0_ode, relay_es_term49_V0_ode, relay_es_term50_V0_ode, relay_es_term51_V0_ode, relay_es_term52_V0_ode, relay_es_term53_V0_ode, relay_es_term54_V0_ode, relay_es_term55_V0_ode, relay_es_term56_V0_ode, relay_es_term57_V0_ode, relay_es_term58_V0_ode, relay_es_term59_V0_ode, relay_es_term60_V0_ode}
        ss2: SegregatedStep "Displacement field" | segvar = {relay_u}
        ss3: SegregatedStep "Spatial mesh displacement" | segvar = {relay_spatial_disp}; subjtech = onevery
  sol5 "Solution 5" (study std5)
    v1: Variables "Dependent Variables 1"
      relay_spatial_disp: Field "Spatial mesh displacement (relay.spatial.disp)"
        scalemethod = manual
        scaleval = 2.07846096908e-07
      relay_u2: Field "Displacement field (relay.u2)" | scalemethod = manual; scaleval = 1e-2*2.07846096908e-05
    t1: Time "Time-Dependent Solver 1" | tlist = range(0,1e-10,5e-8); rtol = 0.00001
      dDef: Direct
      se1: Segregated
        ss1: SegregatedStep "Electric potential"
          segvar = {relay_V, relay_es_term41_V0_ode, relay_es_term42_V0_ode, relay_es_term43_V0_ode, relay_es_term44_V0_ode, relay_es_term45_V0_ode, relay_es_term46_V0_ode, relay_es_term47_V0_ode, relay_es_term48_V0_ode, relay_es_term37_V0_ode, relay_es_term38_V0_ode, relay_es_term39_V0_ode, relay_es_term40_V0_ode, relay_es_term49_V0_ode, relay_es_term50_V0_ode, relay_es_term51_V0_ode, relay_es_term52_V0_ode, relay_es_term53_V0_ode, relay_es_term54_V0_ode, relay_es_term55_V0_ode, relay_es_term56_V0_ode, relay_es_term57_V0_ode, relay_es_term58_V0_ode, relay_es_term59_V0_ode, relay_es_term60_V0_ode}
        ss2: SegregatedStep "Displacement field" | segvar = {relay_u2}
        ss3: SegregatedStep "Spatial mesh displacement" | segvar = {relay_spatial_disp}; subjtech = onevery

Datasets
  dset1: Solution | solution = sol1
  dset2: Solution | solution = sol2
  dset3: Solution | solution = sol3
  dset4: Solution | solution = sol4
  dset5: Solution | solution = sol5
  cpl1: CutPlane "Contact Pressure" | data = dset4; quickplane = xy; quickz = gaptol*1.02
  cpl2: CutPlane "Displacement Contour"
    data = dset4
    quickplane = xy
    quickz = gaptol + t_cont
    spacevars = {cpl1x, cpl1y}
    normal = {cpl1nx, cpl1ny, cpl1nz}

Derived values
  gmev3: EvalGlobalMatrix "Mutual capacitance"
    data = dset3
    table = tbl3
    expr = root.relay.es2.Cinv
    unit = 1/F
    descr = Inverse Maxwell capacitance
    dataseries = average
    outerdataseries = none
    trans = invmaxwellmutual

Evaluation groups
  eg1: EvaluationGroup "Mechanical Properties"
    rowstructure = 
      {1, 3, 0, 1, 1, 1}
      {2, 3, 0, 1, 1, 1}
      {2, 3, 0, 1, 1, 1}
      {2, 3, 0, 1, 1, 1}
      {2, 3, 0, 1, 1, 1}
      {2, 3, 0, 1, 1, 1}
    data = dset1
    min1: MinSurface "Spring constant" on selection box7
      expr = {F_spr, F_spr/solid.disp}
      unit = {N, N/m}
      descr = {Force to apply for spring constant, Spring constant}
    int1: IntVolume "Proof mass" on selection geom1_imp1_Body_dom | expr = solid.rho; unit = kg; descr = Proof Mass
    gev1: EvalGlobal "Eigenmodes" | data = dset2; expr = freq*2*pi; unit = rad/s; descr = Angular frequency
  eg2: EvaluationGroup "Contact Force" | rowstructure = {0, 1, 1, 16}; data = dset4
    int1: IntSurface "Contact 1 Force" on selection int1 | expr = Pc_cont; unit = N; descr = Contact 1 force
    int2: IntSurface "Contact 2 Force" on selection int2 | expr = Pc_cont; unit = N; descr = Contact 2 force
    int3: IntSurface "Contact 3 Force" on selection int3 | expr = Pc_cont; unit = N; descr = Contact 3 force
    int4: IntSurface "Contact 4 Force" on selection int4 | expr = Pc_cont; unit = N; descr = Contact 4 force
    int5: IntSurface "Contact 5 Force" on selection int5 | expr = Pc_cont; unit = N; descr = Contact 5 force
    int6: IntSurface "Contact 6 Force" on selection int6 | expr = Pc_cont; unit = N; descr = Contact 6 force
    int7: IntSurface "Contact 7 Force" on selection int7 | expr = Pc_cont; unit = N; descr = Contact 7 force
    int8: IntSurface "Contact 8 Force" on selection int8 | expr = Pc_cont; unit = N; descr = Contact 8 force
    int9: IntSurface "Contact 9 Force" on selection int9 | expr = Pc_cont; unit = N; descr = Contact 9 force
    int10: IntSurface "Contact 10 Force" on selection int10 | expr = Pc_cont; unit = N; descr = Contact 10 force
    int11: IntSurface "Contact 11 Force" on selection int11 | expr = Pc_cont; unit = N; descr = Contact 11 force
    int12: IntSurface "Contact 12 Force" on selection int12 | expr = Pc_cont; unit = N; descr = Contact 12 force
    int13: IntSurface "Contact 13 Force" on selection int13 | expr = Pc_cont; unit = N; descr = Contact 13 force
    int14: IntSurface "Contact 14 Force" on selection int14 | expr = Pc_cont; unit = N; descr = Contact 14 force
    int15: IntSurface "Contact 15 Force" on selection int15 | expr = Pc_cont; unit = N; descr = Contact 15 force
    int16: IntSurface "Contact 16 Force" on selection int16 | expr = Pc_cont; unit = N; descr = Contact 16 force

Tables
  tbl3: Table "Mutual capacitance"
    Mutual capacitance (F) |  |  |  |  |  |  |  |  |  |  | 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
    5.23096e-17 | 1.45856e-15 | 1.30929e-17 | 1.00961e-17 | 1.3077e-17 | 1.0102e-17 | 1.30662e-17 | 1.0116e-17 | 1.30853e-17 | 1.0087e-17 | 5.9043e-17 | 5.89571e-17
    1.45856e-15 | 2.31645e-16 | 1.15668e-16 | 1.02924e-16 | 1.15533e-16 | 1.02914e-16 | 1.15586e-16 | 1.02986e-16 | 1.15636e-16 | 1.02831e-16 | 9.12313e-19 | 9.07909e-19
    1.30931e-17 | 1.1567e-16 | -4.40555e-22 | 3.91378e-21 | -8.83133e-22 | 2.08249e-22 | -1.10725e-21 | -2.61268e-24 | -9.70696e-22 | 4.02174e-21 | 9.05867e-18 | 9.05136e-18
    1.00964e-17 | 1.02922e-16 | 3.90062e-21 | 1.04412e-21 | 4.32932e-21 | 4.20906e-22 | 2.91156e-22 | 3.01058e-22 | 2.97554e-22 | 3.29476e-22 | -8.31214e-23 | 4.98294e-22
    1.30774e-17 | 1.15534e-16 | -7.67191e-22 | 4.2124e-21 | -2.81513e-22 | 3.47804e-21 | -9.98589e-22 | -1.02662e-22 | -8.94501e-22 | -5.21617e-23 | -1.43526e-22 | -1.31911e-22
    1.01018e-17 | 1.02913e-16 | 1.07394e-22 | 4.98548e-22 | 3.50093e-21 | 1.3217e-21 | 3.99038e-21 | 2.81692e-22 | 1.10325e-22 | 3.11022e-22 | -7.43019e-23 | -6.78667e-23
    1.3066e-17 | 1.15582e-16 | -1.42419e-22 | -3.95881e-22 | -1.01875e-22 | 3.41826e-21 | 2.48582e-21 | 2.98774e-21 | -3.78669e-23 | -5.44578e-22 | -4.56143e-23 | -3.51059e-23
    1.01163e-17 | 1.02985e-16 | 4.39519e-23 | 9.21103e-23 | 6.88217e-23 | 2.26893e-23 | 3.67571e-21 | 9.191e-22 | 4.08625e-21 | -3.89983e-23 | 2.64674e-23 | 7.19462e-24
    1.30857e-17 | 1.15637e-16 | -7.51495e-22 | 6.84522e-23 | -7.97256e-22 | -1.06794e-23 | -9.362e-22 | 3.79334e-21 | -1.61542e-22 | 3.32491e-21 | -1.07478e-22 | -1.04004e-22
    1.0087e-17 | 1.0283e-16 | 3.98535e-21 | 3.23244e-22 | 1.79906e-23 | 2.42249e-22 | -5.35008e-24 | 1.21935e-22 | 3.48947e-21 | 1.11027e-21 | 6.1826e-22 | -4.83466e-23
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
Plots
  pg2: PlotGroup3D "Eigenmode Shape" | data = dset2
    vol1: Volume | expr = solid.disp; unit = µm; descr = Total displacement
      def1: Deform "Deformation 1" | expr = {u, v, w}
      sel1: Selection on selection uni1
  pg1: PlotGroup3D "Parasitic Extraction" | data = dset3
    vol1: Volume | expr = V2; unit = V; descr = Electric potential
  pg10: PlotGroup2D "Contact Placement" | data = cpl2
    con2: Contour
      data = cpl2
      expr = -w
      unit = µm
      levelmethod = levels
      levels = 0.035025
      contourtype = tubes
      tuberadiusscale = 0.02
    surf1: Surface
      data = cpl1
      expr = Pc_cont
      unit = N/m^2
      descr = Penalty-based contact pressure for channels
      wireframe = on
    con1: Contour | data = cpl2; expr = -w; unit = µm; levelmethod = levels; levels = range(0.03497,1e-5,0.03505)
  pg5: PlotGroup1D "Quasi-Static Sweep" | data = dset4
    ptgr1: PointGraph on points 378 | expr = -w; unit = µm; xdata = expr; xdataexpr = es.V0_101
  pg9: PlotGroup1D "Transient Sweep" | data = dset5
    ptgr1: PointGraph on points 246 | expr = -w2; unit = µm

Exports
  anim2: Animation "Eigenmode shape" | giffilename = modal.gif; sweeptype = dde; options = on; axes = on
  anim1: Animation "Parasitic extraction" | target = player; sweeptype = dde; options = off; axes = on; synchronize = off
  tbl2: Table "Mechanical properties" | source = evaluationgroup; table = tbl3; filename = ../output/mechprops.csv
  tbl1: Table "Mutual capacitance" | table = tbl3; filename = ../output/mutualcaps.csv
  tbl5: Table "Contact forces"
    source = evaluationgroup
    table = tbl3
    evaluationgroup = eg2
    filename = ../output/fcont.csv
  plot1: Plot "Quasi-static plot data" | filename = ../output/quasistatic.csv
  plot2: Plot "Transient plot data" | filename = ../output/transient.csv
  plot3: Plot "Displacement contours" | filename = ../output/dispcont.csv
  img1: Image2D "Contact placement plot"
    size = manualprint
    weblockratio = off
    webwidth = 800
    webheight = 600
    webresolution = 96
    printlockratio = off
    printwidth = 120
    printheight = 90
    printresolution = 300
    pngfilename = ../demo/displacement-contour.png
    options = on
    axes = off
  mesh1: Mesh "ON mesh" | data = dset4; filename = ../output/onmesh.mphbin