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/batch
! ANSYS input file written by Workbench version 2020 R1
! File used for geometry attach: C:\Users\AkashLevy\Documents\GitHub\NEM-Relay-CAD\relay_files\dp0\SYS\DM\SYS.scdoc
/title,relay--Modal (E5)
/com,--- Data in consistent MKS units. See Solving Units in the help system for more information.
/units,MKS
/prep7
! Turn off shape checking because checks already performed inside WB mesher.
! See help system for more information.
SHPP,OFF,,NOWARN
etcon,set             ! allow ANSYS to choose best KEYOP's for 180x elements
/com,*********** Nodes for the whole assembly ***********
nblock,3,,11796
(1i9,3e20.9e3)
        1    -1.800000000E-06    -2.200000000E-06    -1.000000000E-07
        2    -1.800000000E-06    -1.800000000E-06    -1.000000000E-07
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-1
/com,*********** Elements for Body 1 "relay\Solid" ***********
et,1,187
eblock,19,solid,,5460
(19i9)
        1        1        1        1        0        0        0        0       10        0        1      846     1808     1536     1719     7343    10244     7339     7342
    10679    10242
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-1
/com,*********** Send User Defined Coordinate System(s) ***********
csys,0
toffst,273.15,  ! Temperature offset from absolute zero
/com,*********** Set Reference Temperature ***********
tref,22.
/com,*********** Send Materials ***********
Temperature = 'TEMP' ! Temperature
MP,DENS,1,4126,	! kg m^-3
MP,EX,1,145000000000,	! Pa
MP,NUXY,1,0.271929824561403,
MP,RSVX,1,1.49e-05,	! kg m^3 A^-2 s^-3

!************************* Model Summary ********************
!relay\Solid,	Poly-SiGe,	matid,	1
!************************* End Model Summary ********************
CMBLOCK,BODY_NODES,NODE,     4248
(8i10)
         1         2         3         4         5         6         7         8
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
CMBLOCK,FACE_NODES,NODE,     2126
(8i10)
        33        34        35        36        37        38        39        40
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/com,*********** Fixed Supports ***********
CMBLOCK,_FIXEDSU,NODE,       84
(8i10)
         1         2         5         7         9        10        13        15
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cmsel,s,_FIXEDSU
d,all,all
nsel,all
fini
/solu
antype,2                   ! modal analysis
_thickRatio=  0     ! Ratio of thick parts in the model
modopt,lanb,6
outres,erase
outres,all,none
outres,nsol,all
outres,etmp,all
mxpand                    ! default expand in case of complex solution
dmpopt,esav,no
dmpopt,emat,no
dmpopt,full,no
! *********** WB SOLVE COMMAND ***********
! check interactive state
*get,ANSINTER_,active,,int
*if,ANSINTER_,ne,0,then
/eof
*endif
solve
/com *************** Write FE CONNECTORS *********
CEWRITE,file,ce,,INTE
*get,_nmodalsolproc,active,0,numcpu
fini
/post1
*dim,_direction,CHAR,6,1
_direction(1) = 'X'
_direction(2) = 'Y'
_direction(3) = 'Z'
_direction(4) = 'ROTX'
_direction(5) = 'ROTY'
_direction(6) = 'ROTZ'
*get,_lastLS,active,0,set,LSTP
*get,_beginset,active,0,set,nset,first,_lastLS
*get,_endset,active,0,set,nset,last,_lastLS
_nummodes = 0
*if,_endset,gt,0,then
_nummodes = _endset - _beginset + 1
*endif
*do,i_mode,1,_nummodes
   *do,j_component,1,6
			*get,PFACT_%i_mode%_%j_component%,MODE,%i_mode%,PFACT,,DIREC,_direction(%j_component%)
   *enddo
*enddo
*dim,_tmdirection,CHAR,6,1
_tmdirection(1) = 'X'
_tmdirection(2) = 'Y'
_tmdirection(3) = 'Z'
_tmdirection(4) = 'X'
_tmdirection(5) = 'Y'
_tmdirection(6) = 'Z'
*do,j_component,1,6
    *if,j_component,gt,3,then
        *get,TOTALMASS_%j_component%,ELEM,0,IOR,_tmdirection(%j_component%)
    *else
        *get,TOTALMASS_%j_component%,ELEM,0,MTOT,_tmdirection(%j_component%)
    *endif
*enddo
fini
