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/batch
! ANSYS input file written by Workbench version 2020 R1
! File used for geometry attach: C:\Users\AkashLevy\Documents\GitHub\NEM-Relay-CAD\relay_files\dp0\SYS\DM\SYS.scdoc
/title,relay--EM Transient Full (F5)
/com,--- Data in consistent MKS units. See Solving Units in the help system for more information.
/units,MKS
/prep7
! Turn off shape checking because checks already performed inside WB mesher.
! See help system for more information.
SHPP,OFF,,NOWARN
etcon,set             ! allow ANSYS to choose best KEYOP's for 180x elements
/com,*********** Nodes for the whole assembly ***********
nblock,3,,11796
(1i9,3e20.9e3)
        1    -1.800000000E-06    -2.200000000E-06    -1.000000000E-07
        2    -1.800000000E-06    -1.800000000E-06    -1.000000000E-07
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-1
/com,*********** Elements for Body 1 "relay\Solid" ***********
et,1,187
eblock,19,solid,,5460
(19i9)
        1        1        1        1        0        0        0        0       10        0        1      846     1808     1536     1719     7343    10244     7339     7342
    10679    10242
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-1
/com,*********** Send User Defined Coordinate System(s) ***********
csys,0
toffst,273.15,  ! Temperature offset from absolute zero
/com,*********** Set Reference Temperature ***********
tref,22.
/com,*********** Send Materials ***********
Temperature = 'TEMP' ! Temperature
MP,DENS,1,4126,	! kg m^-3
MP,EX,1,145000000000,	! Pa
MP,NUXY,1,0.271929824561403,
MP,RSVX,1,1.49e-05,	! kg m^3 A^-2 s^-3

!************************* Model Summary ********************
!relay\Solid,	Poly-SiGe,	matid,	1
!************************* End Model Summary ********************
CMBLOCK,BODY_NODES,NODE,     1746
(8i10)
       465       466       467       468       469       470       471       472
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CMBLOCK,FACE_NODES,NODE,     1326
(8i10)
       465       466       467       468       469       470       471       472
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/com,*********** Fixed Supports ***********
CMBLOCK,_FIXEDSU,NODE,       84
(8i10)
         1         2         5         7         9        10        13        15
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cmsel,s,_FIXEDSU
d,all,all
nsel,all
et,2,14             ! spring element type
/com,*********** Construct Weak Springs, Prototype 1 ***********
*set,_delta,3.25614803897088e-007
type,2
mat,3
real,3
r,3,1.14352030422612e-005
nsel,all
*get,_nspr,ndmx
_nspr=_nspr+1
esel,s,type,,1
nsle,s,active
*get,_minx,node,0,mnloc,x
*get,_miny,node,0,mnloc,y
*get,_minz,node,0,mnloc,z
*get,_maxx,node,0,mxloc,x
*get,_maxy,node,0,mxloc,y
*get,_maxz,node,0,mxloc,z
*dim,_ntets,arra,8
_ntets(1) = NODE(_minx,_miny,_minz)
_ntets(2) = NODE(_minx,_miny,_maxz)
_ntets(3) = NODE(_minx,_maxy,_minz)
_ntets(4) = NODE(_minx,_maxy,_maxz)
_ntets(5) = NODE(_maxx,_miny,_minz)
_ntets(6) = NODE(_maxx,_miny,_maxz)
_ntets(7) = NODE(_maxx,_maxy,_minz)
_ntets(8) = NODE(_maxx,_maxy,_maxz)
*do,_i,1,8
  n,_nspr,nx(_ntets(_i))+_delta,ny(_ntets(_i)),nz(_ntets(_i))
  e,_ntets(_i),_nspr
  d,_nspr,all
  _nspr=_nspr+1
  n,_nspr,nx(_ntets(_i)),ny(_ntets(_i))+_delta,nz(_ntets(_i))
  e,_ntets(_i),_nspr
  d,_nspr,all
  _nspr=_nspr+1
  n,_nspr,nx(_ntets(_i)),ny(_ntets(_i)),nz(_ntets(_i))+_delta
  e,_ntets(_i),_nspr
  d,_nspr,all
  _nspr=_nspr+1
*enddo
*set,_ntets
nsel,all
esel,all
/com,*********** Create Structural MEMS Load ***********
CMBLOCK,_CMMEMS348,NODE,     1746
(8i10)
       465       466       467       468       469       470       471       472
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r,3
EMTGEN,'_CMMEMS348',,'_CM348','UZ',1.000000e-07,4.000000e-08,1.000000e-02,8.854000e-12,,'FULL'

*DIM,_loadvari348,TABLE,3,1,1,TIME,
! Time values
_loadvari348(1,0,1) = 0.
_loadvari348(2,0,1) = 2.e-007
_loadvari348(3,0,1) = 2.01e-007
! Load values
_loadvari348(1,1,1) = 4.
_loadvari348(2,1,1) = 4.
_loadvari348(3,1,1) = 0.

nsel,all
fini
/com,****************************************************************************
/com,*************************    SOLUTION       ********************************
/com,****************************************************************************
/solu
antype,4                   ! transient analysis
nlgeom,on                  ! Turn on Large Deformation Effects
kbc,1                      ! stepped BC's
_thickRatio=  0     ! Ratio of thick parts in the model
eqsl,sparse,,,,,1
cntr,print,1               ! print out contact info and also make no initial contact an error
dmpoption,emat,no             ! Don't combine emat file for DANSYS
dmpoption,esav,no             ! Don't combine esav file for DANSYS
trnopt,full,,,,,hht        ! HHT time integration method
tintp, mosp			! Choose transient integration settings for moderate speed application
nldiag,cont,iter           ! print out contact info each equilibrium iteration
rescontrol,define,last,last,,dele	   ! Program Controlled
/com,****************************************************
/com,******************* SOLVE FOR LS 1 OF 3 ****************
d,_CMMEMS348,volt,%_loadvari348%
d,_CM348,volt,0
d,_CM348,ux,0
d,_CM348,uy,0
d,_CM348,uz,0
nsel,all
esel,all
autots,on                   ! User turned on automatic time stepping
deltim,1e-09,1e-10,5e-09,OFF
time,2.e-007
timint,on                  ! Turn on time integration effects
outres,erase
outres,all,none
outres,nsol,all,
outres,rsol,all
outres,eangl,all
outres,etmp,all
outres,veng,all
outres,nload,all,
outres,strs,all,
outres,epel,all,
outres,eppl,all,
outres,cont,all,
outres,v,all,
outres,a,all,
! ****** Begin Command Snippet ******
*set,ARG1,4.7
*set,ARG2,10.
!   Commands inserted into this file will be executed just prior to the ANSYS SOLVE command.
!   These commands may supersede command settings set by Workbench.

!   Active UNIT system in Workbench when this object was created:  Metric (m, kg, N, s, V, A)
!   NOTE:  Any data that requires units (such as mass) is assumed to be in the consistent solver unit system.
!                See Solving Units in the help system for more information.

epsr=ARG1                           ! USED TO DEFINE THE RELATIVE PERMITTIVITY
kn=ARG2                             ! USED TO DEFINE THE RELATIVE STIFFNESS
                                    ! IN THE DETAILS OF THE COMMAND FILE
fini                                ! LEAVE THE SOLUTION PROCESSOR
/prep7
esel,s,ename,,126
*get,nelems,elem,,count             ! nelems = NUMBER OF THESE ELEMENTS
print "HELLO"
PRINT nelems
elm=0                               ! INITIALIZE ELEMENT NUMBER
*do,i,1,nelems
 elm=elnext(elm)                    ! elm = NEXT HIGHEST ELEMENT NUMBER
 *get,rnum,elem,elm,attr,real       ! rnum = REAL CONSTANT ID # ASSIGNED TO ELEMENT elm
 *get,r7,rcon,rnum,const,7          ! r7 = VALUE OF 7th REAL CONSTANT IN REAL CONSTANT SET #rnum
 r7_new=epsr*r7                     ! MODIFIED VALUE TO SUBSTITUTE FOR ORIGINAL VALUE
 rmod,rnum,7,r7_new                 ! MODIFY THE 7th REAL OF REAL CONSTANT SET ID #rnum

 *get,r5,rcon,rnum,const,5          ! r5 = VALUE OF 5th REAL CONSTANT IN REAL CONSTANT SET #rnum
 r5_new=kn*r5                       ! MODIFIED VALUE TO SUBSTITUTE FOR ORIGINAL VALUE
 rmod,rnum,5,r5_new                 ! MODIFY THE 5th REAL OF REAL CONSTANT SET ID #rnum
*enddo


fini                                ! LEAVE PREP7
/solu                               ! REENTER THE SOLUTION PROCESSOR
alls
! ****** End   Command Snippet ******
! *********** WB SOLVE COMMAND ***********
! check interactive state
*get,ANSINTER_,active,,int
*if,ANSINTER_,ne,0,then
/eof
*endif
solve
/com *************** Write FE CONNECTORS *********
CEWRITE,file,ce,,INTE
/com,****************************************************
/com,*************** FINISHED SOLVE FOR LS 1 *************
/com,****************************************************
/com,******************* SOLVE FOR LS 2 OF 3 ****************
autots,on                   ! User turned on automatic time stepping
deltim,1e-09,1e-10,1e-09,OFF
time,2.01e-007
timint,on                  ! Turn on time integration effects
outres,erase
outres,all,none
outres,nsol,all,
outres,rsol,all
outres,eangl,all
outres,etmp,all
outres,veng,all
outres,nload,all,
outres,strs,all,
outres,epel,all,
outres,eppl,all,
outres,cont,all,
outres,v,all,
outres,a,all,
solve
/com,****************************************************
/com,*************** FINISHED SOLVE FOR LS 2 *************
/com,****************************************************
/com,******************* SOLVE FOR LS 3 OF 3 ****************
autots,on                   ! User turned on automatic time stepping
deltim,1e-09,1e-10,5e-09,OFF
time,4.e-007
timint,on                  ! Turn on time integration effects
outres,erase
outres,all,none
outres,nsol,all,
outres,rsol,all
outres,eangl,all
outres,etmp,all
outres,veng,all
outres,nload,all,
outres,strs,all,
outres,epel,all,
outres,eppl,all,
outres,cont,all,
outres,v,all,
outres,a,all,
solve
/com,****************************************************
/com,*************** FINISHED SOLVE FOR LS 3 *************
/post1
fini
