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/batch
! ANSYS input file written by Workbench version 2020 R1
! File used for geometry attach: C:\Users\AkashLevy\Documents\GitHub\NEM-Relay-CAD\relay_files\dp0\SYS\DM\SYS.scdoc
/title,relay--Spring Constant (A5)
/com,--- Data in consistent MKS units. See Solving Units in the help system for more information.
/units,MKS
/prep7
! Turn off shape checking because checks already performed inside WB mesher.
! See help system for more information.
SHPP,OFF,,NOWARN
etcon,set             ! allow ANSYS to choose best KEYOP's for 180x elements
/com,*********** Nodes for the whole assembly ***********
nblock,3,,11796
(1i9,3e20.9e3)
        1    -1.800000000E-06    -2.200000000E-06    -1.000000000E-07
        2    -1.800000000E-06    -1.800000000E-06    -1.000000000E-07
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-1
/com,*********** Elements for Body 1 "relay\Solid" ***********
et,1,187
eblock,19,solid,,5460
(19i9)
        1        1        1        1        0        0        0        0       10        0        1      846     1808     1536     1719     7343    10244     7339     7342
    10679    10242
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-1
/com,*********** Send User Defined Coordinate System(s) ***********
csys,0
toffst,273.15,  ! Temperature offset from absolute zero
/com,*********** Set Reference Temperature ***********
tref,25.
/com,*********** Send Materials ***********
Temperature = 'TEMP' ! Temperature
MP,DENS,1,4126,	! kg m^-3
MP,EX,1,145000000000,	! Pa
MP,NUXY,1,0.271929824561403,
MP,RSVX,1,1.49e-05,	! kg m^3 A^-2 s^-3

!************************* Model Summary ********************
!relay\Solid,	Poly-SiGe,	matid,	1
!************************* End Model Summary ********************
CMBLOCK,BODY_NODES,NODE,     1746
(8i10)
       465       466       467       468       469       470       471       472
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CMBLOCK,FACE_NODES,NODE,     1326
(8i10)
       465       466       467       468       469       470       471       472
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/com,*********** Fixed Supports ***********
CMBLOCK,_FIXEDSU,NODE,       84
(8i10)
         1         2         5         7         9        10        13        15
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cmsel,s,_FIXEDSU
d,all,all
nsel,all
/com,*********** Create Direct FE , Forces ****
CMBLOCK,_CM267F ,NODE,     1326
(8i10)
       465       466       467       468       469       470       471       472
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fini
/com,****************************************************************************
/com,*************************    SOLUTION       ********************************
/com,****************************************************************************
/solu
antype,0                   ! static analysis
nlgeom,on                  ! Turn on Large Deformation Effects
_thickRatio=  0     ! Ratio of thick parts in the model
eqsl,sparse,,,,,1
cntr,print,1               ! print out contact info and also make no initial contact an error
dmpoption,emat,no             ! Don't combine emat file for DANSYS
dmpoption,esav,no             ! Don't combine esav file for DANSYS
nldiag,cont,iter           ! print out contact info each equilibrium iteration
rescontrol,define,last,last,,dele	   ! Program Controlled
/com,****************************************************
/com,******************* SOLVE FOR LS 1 OF 1 ****************
/com,**** Set Direct FE , Forces ****
f,_CM267F,fx,0.
f,_CM267F,fy,0.
f,_CM267F,fz,-7.54147812971342e-010
autots,on                  ! Workbench Program Controlled automatic time stepping
nsub,1,10,1                ! due to presence of general nonlinear
time,1.
outres,erase
outres,all,none
outres,nsol,all,
outres,rsol,all
outres,eangl,all
outres,etmp,all
outres,veng,all
outres,strs,all,
outres,epel,all,
outres,eppl,all,
outres,cont,all,
! *********** WB SOLVE COMMAND ***********
! check interactive state
*get,ANSINTER_,active,,int
*if,ANSINTER_,ne,0,then
/eof
*endif
solve
/com *************** Write FE CONNECTORS *********
CEWRITE,file,ce,,INTE
/com,****************************************************
/com,*************** FINISHED SOLVE FOR LS 1 *************
/post1
fini
